New Capacitor.38393648 Phases= 3  Bus1=258840425 kvar= 900  kV= 12.47

New Capacitor.38393673_Sw Phases= 3  Bus1=258850725 kvar= 900  kV= 12.47
New Capcontrol.38393673 Element=Line.258850723 Terminal=2 Capacitor=38393673_Sw Type=voltage
~ ONsetting=118
~ OFFsetting=122
~ PTRatio= 60
~ VoltOverride=N
~ Vmax = 116.000000
~ Vmin = 0
~ enabled=F
