New Line.259005024 Phases= 3  Bus1=259005026.1.2.3 Bus2=259005021.1.2.3 Length=61.930000 units=m Spacing=8'-ARM-STANDARD-3PH wires=['336-ACSR-B-18X1' '336-ACSR-B-18X1' '336-ACSR-B-18X1' '1/0-ACSR-B-6X1' ]
New Line.259172454 Phases= 2  Bus1=258851372.1.2 Bus2=258851376.1.2 Length=49.550000 units=m Spacing=8'-ARM-STANDARD-2PH wires=['6-CU-B-S' '6-CU-B-S' '2-CU-B-7' ]
New Line.471228029 Phases= 1  Bus1=471228026.3 Bus2=264494246.3 Length=5.650000 units=m Spacing=VERTICAL-1-PH-60-1PH wires=['2-ACSR-B-6X1' '1/0-ACSR-B-6X1' ]
New Line.259005029 Phases= 3  Bus1=259005031.1.2.3 Bus2=259005026.1.2.3 Length=9.970000 units=m Spacing=8'-ARM-STANDARD-3PH wires=['336-ACSR-B-18X1' '336-ACSR-B-18X1' '336-ACSR-B-18X1' '1/0-ACSR-B-6X1' ]
New Line.469799526 Phases= 3  Bus1=469799524.1.2.3 Bus2=258840494.1.2.3 Length=153.400000 units=m Spacing=8'-ARM-STANDARD-3PH wires=['2-ACSR-B-6X1' '2-ACSR-B-6X1' '2-ACSR-B-6X1' '1/0-ACSR-B-6X1' ]
New Line.471228024 Phases= 1  Bus1=258840526.3 Bus2=471228026.3 Length=1.530000 units=m Spacing=VERTICAL-1-PH-60-1PH wires=['2-ACSR-B-6X1' '1/0-ACSR-B-6X1' ]
New Line.259583268 Phases= 3  Bus1=258850750.1.2.3 Bus2=258850754.1.2.3 Length=10.990000 units=m Spacing=8'-ARM-NON-CENTER-POST-3PH wires=['2-ACSR-B-6X1' '2-ACSR-B-6X1' '2-ACSR-B-6X1' '2-ACSR-B-6X1' ]
New Line.259172459 Phases= 3  Bus1=259172460.1.2.3 Bus2=259172461.1.2.3 Length=46.610000 units=m Spacing=8'-ARM-STANDARD-3PH wires=['1/0-ACSR-B-6X1' '1/0-ACSR-B-6X1' '1/0-ACSR-B-6X1' '1/0-ACSR-B-6X1' ]
New Line.469799525 Phases= 3  Bus1=258840489.1.2.3 Bus2=469799524.1.2.3 Length=125.800000 units=m Spacing=8'-ARM-STANDARD-3PH wires=['2-ACSR-B-6X1' '2-ACSR-B-6X1' '2-ACSR-B-6X1' '1/0-ACSR-B-6X1' ]
New Line.259005007 Phases= 3  Bus1=259005009.1.2.3 Bus2=259005002.1.2.3 Length=156.300000 units=m Spacing=HORIZ-LINE-POST-3PH wires=['336-ACSR-WP-18X1' '336-ACSR-WP-18X1' '336-ACSR-WP-18X1' '1/0-ACSR-B-6X1' ]
New Line.259005085 Phases= 3  Bus1=259005082.1.2.3 Bus2=259005087.1.2.3 Length=115.600000 units=m Spacing=8'-ARM-STANDARD-3PH wires=['1/0-ACSR-B-6X1' '1/0-ACSR-B-6X1' '1/0-ACSR-B-6X1' '1/0-ACSR-B-6X1' ]
New Line.263996171 Phases= 3  Bus1=259005082.1.2.3 Bus2=263996173.1.2.3 Length=1.520000 units=m Spacing=8'-ARM-STANDARD-3PH wires=['2-ACSR-B-6X1' '2-ACSR-B-6X1' '2-ACSR-B-6X1' '2-ACSR-B-6X1' ]
New Line.263996176 Phases= 3  Bus1=263996173.1.2.3 Bus2=259545333.1.2.3 Length=28.840000 units=m Spacing=8'-ARM-STANDARD-3PH wires=['2-ACSR-B-6X1' '2-ACSR-B-6X1' '2-ACSR-B-6X1' '2-ACSR-B-6X1' ]
New Line.259005000 Phases= 3  Bus1=259005002.1.2.3 Bus2=259004995.1.2.3 Length=52.080000 units=m Spacing=HORIZ-LINE-POST-3PH wires=['336-ACSR-WP-18X1' '336-ACSR-WP-18X1' '336-ACSR-WP-18X1' '1/0-ACSR-B-6X1' ]
New Line.259005080 Phases= 3  Bus1=259005077.1.2.3 Bus2=259005082.1.2.3 Length=163.300000 units=m Spacing=8'-ARM-STANDARD-3PH wires=['1/0-ACSR-B-6X1' '1/0-ACSR-B-6X1' '1/0-ACSR-B-6X1' '1/0-ACSR-B-6X1' ]
New Line.264504387 Phases= 3  Bus1=258850734.1.2.3 Bus2=264504389.1.2.3 Length=1.510000 units=m Spacing=HORIZ-LINE-POST-3PH wires=['336-ACSR-B-18X1' '336-ACSR-B-18X1' '336-ACSR-B-18X1' '1/0-ACSR-B-6X1' ]
New Line.469544353 Phases= 3  Bus1=258850628.1.2.3 Bus2=264379499.1.2.3 Length=1.520000 units=m Spacing=HORIZ-LINE-POST-3PH wires=['336-ACSR-B-18X1' '336-ACSR-B-18X1' '336-ACSR-B-18X1' '1/0-ACSR-B-6X1' ]
New Line.471228080 Phases= 1  Bus1=258840546.3 Bus2=258840551.3 Length=113.700000 units=m Spacing=VERTICAL-1-PH-60-1PH wires=['2-ACSR-B-6X1' '1/0-ACSR-B-6X1' ]
New Line.259005102 Phases= 3  Bus1=259005099.1.2.3 Bus2=259005104.1.2.3 Length=36.660000 units=m Spacing=8'-ARM-NON-CENTER-POST-3PH wires=['2-ACSR-B-6X1' '2-ACSR-B-6X1' '2-ACSR-B-6X1' '2-ACSR-B-6X1' ]
New Line.263511662 Phases= 3  Bus1=258839921.1.2.3 Bus2=263511664.1.2.3 Length=1.520000 units=m Spacing=8'-ARM-NON-CENTER-POST-3PH wires=['2-ACSR-B-6X1' '2-ACSR-B-6X1' '2-ACSR-B-6X1' '2-ACSR-B-6X1' ]
New Line.263511667 Phases= 3  Bus1=263511664.1.2.3 Bus2=258851476.1.2.3 Length=40.410000 units=m Spacing=8'-ARM-NON-CENTER-POST-3PH wires=['2-ACSR-B-6X1' '2-ACSR-B-6X1' '2-ACSR-B-6X1' '2-ACSR-B-6X1' ]
New Line.460932294 Phases= 1  Bus1=460932291.2 Bus2=258840373.2 Length=94.100000 units=m Spacing=VERTICAL-1-PH-60-1PH wires=['2-ACSR-B-6X1' '1/0-ACSR-B-6X1' ]
New Line.263511743 Phases= 3  Bus1=258840267.1.2.3 Bus2=263511745.1.2.3 Length=1.530000 units=m Spacing=8'-ARM-NON-CENTER-POST-3PH wires=['2-ACSR-B-6X1' '2-ACSR-B-6X1' '2-ACSR-B-6X1' '2-ACSR-B-6X1' ]
New Line.384045894 Phases= 3  Bus1=259004973.1.2.3 Bus2=384045889.1.2.3 Length=124.500000 units=m Spacing=HORIZ-LINE-POST-3PH wires=['336-ACSR-WP-18X1' '336-ACSR-WP-18X1' '336-ACSR-WP-18X1' '1/0-ACSR-B-6X1' ]
New Line.263511748 Phases= 3  Bus1=263511745.1.2.3 Bus2=258851054.1.2.3 Length=49.690000 units=m Spacing=8'-ARM-NON-CENTER-POST-3PH wires=['2-ACSR-B-6X1' '2-ACSR-B-6X1' '2-ACSR-B-6X1' '2-ACSR-B-6X1' ]
New Line.263511721 Phases= 3  Bus1=263511718.1.2.3 Bus2=258851313.1.2.3 Length=50.770000 units=m Spacing=8'-ARM-NON-CENTER-POST-3PH wires=['2-ACSR-B-6X1' '2-ACSR-B-6X1' '2-ACSR-B-6X1' '2-ACSR-B-6X1' ]
New Line.259140636 Phases= 3  Bus1=259005072.1.2.3 Bus2=259005076.1.2.3 Length=57.520000 units=m Spacing=8'-ARM-STANDARD-3PH wires=['1/0-ACSR-B-6X1' '1/0-ACSR-B-6X1' '1/0-ACSR-B-6X1' '1/0-ACSR-B-6X1' ]
New Line.263511725 Phases= 1  Bus1=258840247.1 Bus2=263511727.1 Length=1.520000 units=m Spacing=VERTICAL-1-PH-60-1PH wires=['2-ACSR-B-6X1' '2-ACSR-B-6X1' ]
New Line.263511680 Phases= 3  Bus1=258840012.1.2.3 Bus2=263511682.1.2.3 Length=1.530000 units=m Spacing=8'-ARM-NON-CENTER-POST-3PH wires=['2-ACSR-B-6X1' '2-ACSR-B-6X1' '2-ACSR-B-6X1' '1/0-ACSR-B-6X1' ]
New Line.263511685 Phases= 3  Bus1=263511682.1.2.3 Bus2=258840142.1.2.3 Length=63.230000 units=m Spacing=8'-ARM-NON-CENTER-POST-3PH wires=['2-ACSR-B-6X1' '2-ACSR-B-6X1' '2-ACSR-B-6X1' '1/0-ACSR-B-6X1' ]
New Line.263511689 Phases= 3  Bus1=258840027.1.2.3 Bus2=263511691.1.2.3 Length=1.530000 units=m Spacing=8'-ARM-NON-CENTER-POST-3PH wires=['2-ACSR-B-6X1' '2-ACSR-B-6X1' '2-ACSR-B-6X1' '2-ACSR-B-6X1' ]
New Line.259004983 Phases= 3  Bus1=259004985.1.2.3 Bus2=259004984.1.2.3 Length=83.120000 units=m Spacing=HORIZ-LINE-POST-3PH wires=['336-ACSR-WP-18X1' '336-ACSR-WP-18X1' '336-ACSR-WP-18X1' '1/0-ACSR-B-6X1' ]
New Line.263511703 Phases= 3  Bus1=263511700.1.2.3 Bus2=258840072.1.2.3 Length=28.630000 units=m Spacing=8'-ARM-NON-CENTER-POST-3PH wires=['2-ACSR-B-6X1' '2-ACSR-B-6X1' '2-ACSR-B-6X1' '2-ACSR-B-6X1' ]
New Line.258850663 Phases= 3  Bus1=258850660.1.2.3 Bus2=258850665.1.2.3 Length=75.080000 units=m Spacing=HORIZ-LINE-POST-3PH wires=['336-ACSR-B-18X1' '336-ACSR-B-18X1' '336-ACSR-B-18X1' '1/0-ACSR-B-6X1' ]
New Line.258840465 Phases= 3  Bus1=258840462.1.2.3 Bus2=258840467.1.2.3 Length=87.060000 units=m Spacing=8'-ARM-NON-CENTER-POST-3PH wires=['336-ACSR-WP-18X1' '336-ACSR-WP-18X1' '336-ACSR-WP-18X1' '1/0-ACSR-B-6X1' ]
New Line.258839874 Phases= 3  Bus1=258839871.1.2.3 Bus2=258839876.1.2.3 Length=104.900000 units=m Spacing=8'-ARM-NON-CENTER-POST-3PH wires=['336-ACSR-B-18X1' '336-ACSR-B-18X1' '336-ACSR-B-18X1' '1/0-ACSR-B-6X1' ]
New Line.258840460 Phases= 3  Bus1=258840457.1.2.3 Bus2=258840462.1.2.3 Length=32.490000 units=m Spacing=8'-ARM-NON-CENTER-POST-3PH wires=['336-ACSR-WP-18X1' '336-ACSR-WP-18X1' '336-ACSR-WP-18X1' '1/0-ACSR-B-6X1' ]
New Line.259176597 Phases= 3  Bus1=258850618.1.2.3 Bus2=259121514.1.2.3 Length=28.810000 units=m Spacing=8'-ARM-STANDARD-3PH wires=['2-ACSR-B-6X1' '2-ACSR-B-6X1' '2-ACSR-B-6X1' '2-ACSR-B-6X1' ]
New Line.263511788 Phases= 3  Bus1=258840452.1.2.3 Bus2=263511790.1.2.3 Length=1.520000 units=m Spacing=8'-ARM-NON-CENTER-POST-3PH wires=['2-ACSR-B-6X1' '2-ACSR-B-6X1' '2-ACSR-B-6X1' '2-ACSR-B-6X1' ]
New Line.258850668 Phases= 3  Bus1=258850665.1.2.3 Bus2=258850670.1.2.3 Length=80.590000 units=m Spacing=HORIZ-LINE-POST-3PH wires=['336-ACSR-B-18X1' '336-ACSR-B-18X1' '336-ACSR-B-18X1' '1/0-ACSR-B-6X1' ]
New Line.259004988 Phases= 3  Bus1=259004990.1.2.3 Bus2=259004985.1.2.3 Length=39.950000 units=m Spacing=HORIZ-LINE-POST-3PH wires=['336-ACSR-WP-18X1' '336-ACSR-WP-18X1' '336-ACSR-WP-18X1' '1/0-ACSR-B-6X1' ]
New Line.263638665 Phases= 1  Bus1=258840515.3 Bus2=263638667.3 Length=1.520000 units=m Spacing=VERTICAL-1-PH-60-1PH wires=['2-ACSR-B-6X1' '2-ACSR-B-6X1' ]
New Line.258839879 Phases= 3  Bus1=258839876.1.2.3 Bus2=258839881.1.2.3 Length=19.660000 units=m Spacing=8'-ARM-NON-CENTER-POST-3PH wires=['336-ACSR-B-18X1' '336-ACSR-B-18X1' '336-ACSR-B-18X1' '1/0-ACSR-B-6X1' ]
New Line.258850763 Phases= 3  Bus1=258850760.1.2.3 Bus2=258850765.1.2.3 Length=4.670000 units=m Spacing=8'-ARM-NON-CENTER-POST-3PH wires=['2-ACSR-B-6X1' '2-ACSR-B-6X1' '2-ACSR-B-6X1' '2-ACSR-B-6X1' ]
New Line.264494249 Phases= 1  Bus1=264494246.3 Bus2=258840531.3 Length=152.400000 units=m Spacing=VERTICAL-1-PH-60-1PH wires=['2-ACSR-B-6X1' '1/0-ACSR-B-6X1' ]
New Line.258850643 Phases= 3  Bus1=258850638.1.2.3 Bus2=258850645.1.2.3 Length=151.900000 units=m Spacing=HORIZ-LINE-POST-3PH wires=['336-ACSR-B-18X1' '336-ACSR-B-18X1' '336-ACSR-B-18X1' '1/0-ACSR-B-6X1' ]
New Line.258850768 Phases= 3  Bus1=258850765.1.2.3 Bus2=258850770.1.2.3 Length=26.730000 units=m Spacing=8'-ARM-NON-CENTER-POST-3PH wires=['2-ACSR-B-6X1' '2-ACSR-B-6X1' '2-ACSR-B-6X1' '2-ACSR-B-6X1' ]
New Line.258839971 Phases= 3  Bus1=258839968.1.2.3 Bus2=258839973.1.2.3 Length=47.350000 units=m Spacing=8'-ARM-NON-CENTER-POST-3PH wires=['336-ACSR-B-18X1' '336-ACSR-B-18X1' '336-ACSR-B-18X1' '1/0-ACSR-B-6X1' ]
New Line.258839857 Phases= 3  Bus1=258839854.1.2.3 Bus2=258839859.1.2.3 Length=27.730000 units=m Spacing=8'-ARM-NON-CENTER-POST-3PH wires=['336-ACSR-B-18X1' '336-ACSR-B-18X1' '336-ACSR-B-18X1' '1/0-ACSR-B-6X1' ]
New Line.258839852 Phases= 3  Bus1=258839840.1.2.3 Bus2=258839854.1.2.3 Length=19.050000 units=m Spacing=8'-ARM-NON-CENTER-POST-3PH wires=['336-ACSR-B-18X1' '336-ACSR-B-18X1' '336-ACSR-B-18X1' '1/0-ACSR-B-6X1' ]
New Line.258839978 Phases= 3  Bus1=258839973.1.2.3 Bus2=258839980.1.2.3 Length=32.570000 units=m Spacing=8'-ARM-NON-CENTER-POST-3PH wires=['336-ACSR-B-18X1' '336-ACSR-B-18X1' '336-ACSR-B-18X1' '1/0-ACSR-B-6X1' ]
New Line.258850648 Phases= 3  Bus1=258850645.1.2.3 Bus2=258850650.1.2.3 Length=15.170000 units=m Spacing=HORIZ-LINE-POST-3PH wires=['336-ACSR-B-18X1' '336-ACSR-B-18X1' '336-ACSR-B-18X1' '1/0-ACSR-B-6X1' ]
New Line.258840265 Phases= 3  Bus1=258840262.1.2.3 Bus2=258840267.1.2.3 Length=65.200000 units=m Spacing=8'-ARM-NON-CENTER-POST-3PH wires=['336-ACSR-B-18X1' '336-ACSR-B-18X1' '336-ACSR-B-18X1' '2-CU-B-7' ]
New Line.258840260 Phases= 3  Bus1=258840257.1.2.3 Bus2=258840262.1.2.3 Length=34.790000 units=m Spacing=8'-ARM-NON-CENTER-POST-3PH wires=['336-ACSR-B-18X1' '336-ACSR-B-18X1' '336-ACSR-B-18X1' '2-CU-B-7' ]
New Line.264494225 Phases= 3  Bus1=258840292.1.2.3 Bus2=264494227.1.2.3 Length=1.530000 units=m Spacing=8'-ARM-NON-CENTER-POST-3PH wires=['336-ACSR-B-18X1' '336-ACSR-B-18X1' '336-ACSR-B-18X1' '2-CU-B-7' ]
New Line.263697818 Phases= 3  Bus1=263697815.1.2.3 Bus2=258840178.1.2.3 Length=19.560000 units=m Spacing=8'-ARM-STANDARD-3PH wires=['1/0-ACSR-B-6X1' '1/0-ACSR-B-6X1' '1/0-ACSR-B-6X1' '1/0-ACSR-B-6X1' ]
New Line.258850743 Phases= 3  Bus1=258850740.1.2.3 Bus2=258850745.1.2.3 Length=4.490000 units=m Spacing=8'-ARM-NON-CENTER-POST-3PH wires=['2-ACSR-B-6X1' '2-ACSR-B-6X1' '2-ACSR-B-6X1' '2-ACSR-B-6X1' ]
New Line.264494221 Phases= 3  Bus1=264494218.1.2.3 Bus2=258840388.1.2.3 Length=29.520000 units=m Spacing=8'-ARM-NON-CENTER-POST-3PH wires=['336-ACSR-WP-18X1' '336-ACSR-WP-18X1' '336-ACSR-WP-18X1' '1/0-ACSR-B-6X1' ]
New Line.258840544 Phases= 1  Bus1=258840541.3 Bus2=258840546.3 Length=73.950000 units=m Spacing=VERTICAL-1-PH-60-1PH wires=['2-ACSR-B-6X1' '1/0-ACSR-B-6X1' ]
New Line.258839956 Phases= 3  Bus1=258839953.1.2.3 Bus2=258839958.1.2.3 Length=45.440000 units=m Spacing=8'-ARM-NON-CENTER-POST-3PH wires=['336-ACSR-B-18X1' '336-ACSR-B-18X1' '336-ACSR-B-18X1' '1/0-ACSR-B-6X1' ]
New Line.258850626 Phases= 3  Bus1=258850564.1.2.3 Bus2=258850628.1.2.3 Length=25.320000 units=m Spacing=HORIZ-LINE-POST-3PH wires=['336-ACSR-B-18X1' '336-ACSR-B-18X1' '336-ACSR-B-18X1' '1/0-ACSR-B-6X1' ]
New Line.258850567 Phases= 3  Bus1=258850559.1.2.3 Bus2=258850569.1.2.3 Length=42.590000 units=m Spacing=HORIZ-LINE-POST-3PH wires=['336-ACSR-B-18X1' '336-ACSR-B-18X1' '336-ACSR-B-18X1' '1/0-ACSR-B-6X1' ]
New Line.263973888 Phases= 3  Bus1=258850970.1.2.3 Bus2=263973890.1.2.3 Length=1.520000 units=m Spacing=8'-ARM-NON-CENTER-POST-3PH wires=['336-ACSR-WP-18X1' '336-ACSR-WP-18X1' '336-ACSR-WP-18X1' '1/0-ACSR-B-6X1' ]
New Line.263697813 Phases= 3  Bus1=258840164.1.2.3 Bus2=263697815.1.2.3 Length=1.520000 units=m Spacing=8'-ARM-STANDARD-3PH wires=['1/0-ACSR-B-6X1' '1/0-ACSR-B-6X1' '1/0-ACSR-B-6X1' '1/0-ACSR-B-6X1' ]
New Line.263761822 Phases= 3  Bus1=258850581.1.2.3 Bus2=263761824.1.2.3 Length=1.530000 units=m Spacing=8'-ARM-NON-CENTER-POST-3PH wires=['1/0-ACSR-B-6X1' '1/0-ACSR-B-6X1' '1/0-ACSR-B-6X1' '1/0-ACSR-B-6X1' ]
New Line.258850562 Phases= 3  Bus1=258850559.1.2.3 Bus2=258850564.1.2.3 Length=28.070000 units=m Spacing=HORIZ-LINE-POST-3PH wires=['336-ACSR-B-18X1' '336-ACSR-B-18X1' '336-ACSR-B-18X1' '1/0-ACSR-B-6X1' ]
New Line.258850748 Phases= 3  Bus1=258850740.1.2.3 Bus2=258850750.1.2.3 Length=8.700000 units=m Spacing=8'-ARM-NON-CENTER-POST-3PH wires=['2-ACSR-B-6X1' '2-ACSR-B-6X1' '2-ACSR-B-6X1' '2-ACSR-B-6X1' ]
New Line.258839951 Phases= 3  Bus1=258839948.1.2.3 Bus2=258839953.1.2.3 Length=36.690000 units=m Spacing=8'-ARM-NON-CENTER-POST-3PH wires=['336-ACSR-B-18X1' '336-ACSR-B-18X1' '336-ACSR-B-18X1' '1/0-ACSR-B-6X1' ]
New Line.258840364 Phases= 3  Bus1=258840365.1.2.3 Bus2=258840366.1.2.3 Length=16.750000 units=m Spacing=8'-ARM-STANDARD-3PH wires=['2-ACSR-B-6X1' '2-ACSR-B-6X1' '2-ACSR-B-6X1' '2-ACSR-B-6X1' ]
New Line.258850621 Phases= 3  Bus1=258850576.1.2.3 Bus2=258850623.1.2.3 Length=15.380000 units=m Spacing=8'-ARM-NON-CENTER-POST-3PH wires=['2-ACSR-B-6X1' '2-ACSR-B-6X1' '2-ACSR-B-6X1' '2-ACSR-B-6X1' ]
New Line.258851464 Phases= 3  Bus1=258851452.1.2.3 Bus2=258851466.1.2.3 Length=47.020000 units=m Spacing=8'-ARM-NON-CENTER-POST-3PH wires=['2-ACSR-B-6X1' '2-ACSR-B-6X1' '2-ACSR-B-6X1' '1/0-ACSR-B-6X1' ]
New Line.263761827 Phases= 3  Bus1=263761824.1.2.3 Bus2=258850586.1.2.3 Length=50.240000 units=m Spacing=8'-ARM-NON-CENTER-POST-3PH wires=['1/0-ACSR-B-6X1' '1/0-ACSR-B-6X1' '1/0-ACSR-B-6X1' '1/0-ACSR-B-6X1' ]
New Line.258840423 Phases= 3  Bus1=258840413.1.2.3 Bus2=258840425.1.2.3 Length=61.670000 units=m Spacing=8'-ARM-NON-CENTER-POST-3PH wires=['336-ACSR-WP-18X1' '336-ACSR-WP-18X1' '336-ACSR-WP-18X1' '1/0-ACSR-B-6X1' ]
New Line.258839833 Phases= 3  Bus1=BELLHAVEN_RET_01291204_reg.1.2.3 Bus2=258839835.1.2.3 Length=23.020000 units=m Spacing=8'-ARM-STANDARD-3PH wires=['556-AAC-B-19' '556-AAC-B-19' '556-AAC-B-19' '556-AAC-B-19' ]
New Line.258840245 Phases= 3  Bus1=258840242.1.2.3 Bus2=258840247.1.2.3 Length=87.750000 units=m Spacing=8'-ARM-NON-CENTER-POST-3PH wires=['336-ACSR-B-18X1' '336-ACSR-B-18X1' '336-ACSR-B-18X1' '2-CU-B-7' ]
New Line.258840428 Phases= 3  Bus1=258840425.1.2.3 Bus2=258840430.1.2.3 Length=53.030000 units=m Spacing=8'-ARM-NON-CENTER-POST-3PH wires=['336-ACSR-WP-18X1' '336-ACSR-WP-18X1' '336-ACSR-WP-18X1' '1/0-ACSR-B-6X1' ]
New Line.258840240 Phases= 3  Bus1=258840235.1.2.3 Bus2=258840242.1.2.3 Length=87.180000 units=m Spacing=8'-ARM-NON-CENTER-POST-3PH wires=['336-ACSR-B-18X1' '336-ACSR-B-18X1' '336-ACSR-B-18X1' '2-CU-B-7' ]
New Line.264494202 Phases= 3  Bus1=264494199.1.2.3 Bus2=258840052.1.2.3 Length=36.220000 units=m Spacing=8'-ARM-NON-CENTER-POST-3PH wires=['336-ACSR-B-18X1' '336-ACSR-B-18X1' '336-ACSR-B-18X1' '2-CU-B-7' ]
New Line.258851469 Phases= 3  Bus1=258839963.1.2.3 Bus2=258851471.1.2.3 Length=58.370000 units=m Spacing=8'-ARM-STANDARD-3PH wires=['2-ACSR-B-6X1' '2-ACSR-B-6X1' '2-ACSR-B-6X1' '2-ACSR-B-6X1' ]
New Line.258839838 Phases= 3  Bus1=258839835.1.2.3 Bus2=258839840.1.2.3 Length=90.570000 units=m Spacing=8'-ARM-NON-CENTER-POST-3PH wires=['556-AAC-B-19' '556-AAC-B-19' '556-AAC-B-19' '556-AAC-B-19' ]
New Line.258850723 Phases= 3  Bus1=258850720.1.2.3 Bus2=258850725.1.2.3 Length=38.770000 units=m Spacing=HORIZ-LINE-POST-3PH wires=['336-ACSR-B-18X1' '336-ACSR-B-18X1' '336-ACSR-B-18X1' '1/0-ACSR-B-6X1' ]
New Line.258840524 Phases= 1  Bus1=258840521.3 Bus2=258840526.3 Length=217.800000 units=m Spacing=VERTICAL-1-PH-60-1PH wires=['2-ACSR-B-6X1' '2-ACSR-B-6X1' ]
New Line.258840065 Phases= 3  Bus1=258840062.1.2.3 Bus2=258840067.1.2.3 Length=23.770000 units=m Spacing=8'-ARM-NON-CENTER-POST-3PH wires=['336-ACSR-B-18X1' '336-ACSR-B-18X1' '336-ACSR-B-18X1' '2-CU-B-7' ]
New Line.258850606 Phases= 3  Bus1=258850603.1.2.3 Bus2=258850608.1.2.3 Length=46.970000 units=m Spacing=8'-ARM-NON-CENTER-POST-3PH wires=['1/0-ACSR-B-6X1' '1/0-ACSR-B-6X1' '1/0-ACSR-B-6X1' '1/0-ACSR-B-6X1' ]
New Line.258839934 Phases= 3  Bus1=258839931.1.2.3 Bus2=258839936.1.2.3 Length=66.100000 units=m Spacing=8'-ARM-NON-CENTER-POST-3PH wires=['336-ACSR-WP-18X1' '336-ACSR-WP-18X1' '336-ACSR-WP-18X1' '1/0-ACSR-B-6X1' ]
New Line.258840060 Phases= 3  Bus1=258840057.1.2.3 Bus2=258840062.1.2.3 Length=10.760000 units=m Spacing=8'-ARM-NON-CENTER-POST-3PH wires=['336-ACSR-B-18X1' '336-ACSR-B-18X1' '336-ACSR-B-18X1' '2-CU-B-7' ]
New Line.258850547 Phases= 3  Bus1=258850544.1.2.3 Bus2=258850549.1.2.3 Length=41.540000 units=m Spacing=HORIZ-LINE-POST-3PH wires=['336-ACSR-B-18X1' '336-ACSR-B-18X1' '336-ACSR-B-18X1' '1/0-ACSR-B-6X1' ]
New Line.258840406 Phases= 3  Bus1=258840403.1.2.3 Bus2=258840408.1.2.3 Length=58.540000 units=m Spacing=8'-ARM-NON-CENTER-POST-3PH wires=['336-ACSR-WP-18X1' '336-ACSR-WP-18X1' '336-ACSR-WP-18X1' '1/0-ACSR-B-6X1' ]
New Line.258840487 Phases= 3  Bus1=258840484.1.2.3 Bus2=258840489.1.2.3 Length=119.200000 units=m Spacing=8'-ARM-STANDARD-3PH wires=['2-ACSR-B-6X1' '2-ACSR-B-6X1' '2-ACSR-B-6X1' '1/0-ACSR-B-6X1' ]
New Line.258850542 Phases= 3  Bus1=258850537.1.2.3 Bus2=258850544.1.2.3 Length=6.520000 units=m Spacing=HORIZ-LINE-POST-3PH wires=['336-ACSR-B-18X1' '336-ACSR-B-18X1' '336-ACSR-B-18X1' '1/0-ACSR-B-6X1' ]
New Line.258850683 Phases= 3  Bus1=258850675.1.2.3 Bus2=258850685.1.2.3 Length=23.360000 units=m Spacing=HORIZ-LINE-POST-3PH wires=['336-ACSR-B-18X1' '336-ACSR-B-18X1' '336-ACSR-B-18X1' '1/0-ACSR-B-6X1' ]
New Line.258850728 Phases= 3  Bus1=258850725.1.2.3 Bus2=258850730.1.2.3 Length=58.330000 units=m Spacing=HORIZ-LINE-POST-3PH wires=['336-ACSR-B-18X1' '336-ACSR-B-18X1' '336-ACSR-B-18X1' '1/0-ACSR-B-6X1' ]
New Line.258840344 Phases= 3  Bus1=258840339.1.2.3 Bus2=258840346.1.2.3 Length=67.690000 units=m Spacing=8'-ARM-NON-CENTER-POST-3PH wires=['1/0-ACSR-WP-6X1' '1/0-ACSR-WP-6X1' '1/0-ACSR-WP-6X1' '1/0-ACSR-B-6X1' ]
New Line.258850601 Phases= 3  Bus1=258850596.1.2.3 Bus2=258850603.1.2.3 Length=46.840000 units=m Spacing=8'-ARM-NON-CENTER-POST-3PH wires=['1/0-ACSR-B-6X1' '1/0-ACSR-B-6X1' '1/0-ACSR-B-6X1' '1/0-ACSR-B-6X1' ]
New Line.258840482 Phases= 3  Bus1=258840479.1.2.3 Bus2=258840484.1.2.3 Length=40.780000 units=m Spacing=8'-ARM-STANDARD-3PH wires=['2-ACSR-B-6X1' '2-ACSR-B-6X1' '2-ACSR-B-6X1' '1/0-ACSR-B-6X1' ]
New Line.258851445 Phases= 3  Bus1=258851446.1.2.3 Bus2=258851447.1.2.3 Length=16.850000 units=m Spacing=8'-ARM-STANDARD-3PH wires=['1/0-ACSR-B-6X1' '1/0-ACSR-B-6X1' '1/0-ACSR-B-6X1' '1/0-ACSR-B-6X1' ]
New Line.258839894 Phases= 3  Bus1=258839891.1.2.3 Bus2=258839896.1.2.3 Length=67.370000 units=m Spacing=8'-ARM-NON-CENTER-POST-3PH wires=['336-ACSR-B-18X1' '336-ACSR-B-18X1' '336-ACSR-B-18X1' '1/0-ACSR-B-6X1' ]
New Line.258840401 Phases= 3  Bus1=258840398.1.2.3 Bus2=258840403.1.2.3 Length=157.900000 units=m Spacing=8'-ARM-NON-CENTER-POST-3PH wires=['336-ACSR-WP-18X1' '336-ACSR-WP-18X1' '336-ACSR-WP-18X1' '1/0-ACSR-B-6X1' ]
New Line.258851440 Phases= 1  Bus1=258851437.2 Bus2=258851442.2 Length=25.840000 units=m Spacing=VERTICAL-1-PH-60-1PH wires=['2-ACSR-B-6X1' '2-CU-B-7' ]
New Line.258850688 Phases= 3  Bus1=258850685.1.2.3 Bus2=258850690.1.2.3 Length=18.090000 units=m Spacing=HORIZ-LINE-POST-3PH wires=['336-ACSR-B-18X1' '336-ACSR-B-18X1' '336-ACSR-B-18X1' '1/0-ACSR-B-6X1' ]
New Line.258851266 Phases= 3  Bus1=258851249.1.2.3 Bus2=258851268.1.2.3 Length=24.450000 units=m Spacing=8'-ARM-NON-CENTER-POST-3PH wires=['2-ACSR-B-6X1' '2-ACSR-B-6X1' '2-ACSR-B-6X1' '1/0-ACSR-B-6X1' ]
New Line.258840162 Phases= 3  Bus1=258840159.1.2.3 Bus2=258840164.1.2.3 Length=28.100000 units=m Spacing=8'-ARM-NON-CENTER-POST-3PH wires=['336-ACSR-B-18X1' '336-ACSR-B-18X1' '336-ACSR-B-18X1' '2-CU-B-7' ]
New Line.258840223 Phases= 3  Bus1=258840220.1.2.3 Bus2=258840225.1.2.3 Length=71.370000 units=m Spacing=8'-ARM-NON-CENTER-POST-3PH wires=['336-ACSR-B-18X1' '336-ACSR-B-18X1' '336-ACSR-B-18X1' '2-CU-B-7' ]
New Line.258840349 Phases= 3  Bus1=258840346.1.2.3 Bus2=258840351.1.2.3 Length=56.080000 units=m Spacing=8'-ARM-NON-CENTER-POST-3PH wires=['1/0-ACSR-WP-6X1' '1/0-ACSR-WP-6X1' '1/0-ACSR-WP-6X1' '1/0-ACSR-B-6X1' ]
New Line.258839899 Phases= 3  Bus1=258839896.1.2.3 Bus2=258839901.1.2.3 Length=23.980000 units=m Spacing=8'-ARM-NON-CENTER-POST-3PH wires=['336-ACSR-B-18X1' '336-ACSR-B-18X1' '336-ACSR-B-18X1' '1/0-ACSR-B-6X1' ]
New Line.263714480 Phases= 1  Bus1=263714477.1 Bus2=259223113.1 Length=59.910000 units=m Spacing=VERTICAL-1-PH-104-1PH wires=['2-ACSR-B-6X1' '2-ACSR-B-6X1' ]
New Line.258850703 Phases= 3  Bus1=258850700.1.2.3 Bus2=258850705.1.2.3 Length=5.350000 units=m Spacing=HORIZ-LINE-POST-3PH wires=['336-ACSR-B-18X1' '336-ACSR-B-18X1' '336-ACSR-B-18X1' '1/0-ACSR-B-6X1' ]
New Line.258840504 Phases= 3  Bus1=258840499.1.2.3 Bus2=258840506.1.2.3 Length=27.270000 units=m Spacing=8'-ARM-STANDARD-3PH wires=['2-ACSR-B-6X1' '2-ACSR-B-6X1' '2-ACSR-B-6X1' '1/0-ACSR-B-6X1' ]
New Line.258840045 Phases= 3  Bus1=258840042.1.2.3 Bus2=258840047.1.2.3 Length=34.270000 units=m Spacing=8'-ARM-NON-CENTER-POST-3PH wires=['336-ACSR-B-18X1' '336-ACSR-B-18X1' '336-ACSR-B-18X1' '2-CU-B-7' ]
New Line.258840228 Phases= 3  Bus1=258840225.1.2.3 Bus2=258840230.1.2.3 Length=33.800000 units=m Spacing=8'-ARM-NON-CENTER-POST-3PH wires=['336-ACSR-B-18X1' '336-ACSR-B-18X1' '336-ACSR-B-18X1' '2-CU-B-7' ]
New Line.258839914 Phases= 3  Bus1=258839911.1.2.3 Bus2=258839916.1.2.3 Length=10.190000 units=m Spacing=8'-ARM-NON-CENTER-POST-3PH wires=['336-ACSR-WP-18X1' '336-ACSR-WP-18X1' '336-ACSR-WP-18X1' '1/0-ACSR-B-6X1' ]
New Line.258840040 Phases= 3  Bus1=258840037.1.2.3 Bus2=258840042.1.2.3 Length=17.130000 units=m Spacing=8'-ARM-NON-CENTER-POST-3PH wires=['336-ACSR-B-18X1' '336-ACSR-B-18X1' '336-ACSR-B-18X1' '2-CU-B-7' ]
New Line.258840169 Phases= 3  Bus1=258840164.1.2.3 Bus2=258840171.1.2.3 Length=38.910000 units=m Spacing=8'-ARM-NON-CENTER-POST-3PH wires=['2-ACSR-B-6X1' '2-ACSR-B-6X1' '2-ACSR-B-6X1' '2-ACSR-B-6X1' ]
New Line.258839993 Phases= 3  Bus1=258839990.1.2.3 Bus2=258839995.1.2.3 Length=65.980000 units=m Spacing=8'-ARM-NON-CENTER-POST-3PH wires=['336-ACSR-B-18X1' '336-ACSR-B-18X1' '336-ACSR-B-18X1' '1/0-ACSR-B-6X1' ]
New Line.258840327 Phases= 3  Bus1=258840324.1.2.3 Bus2=258840329.1.2.3 Length=34.040000 units=m Spacing=8'-ARM-NON-CENTER-POST-3PH wires=['1/0-ACSR-WP-6X1' '1/0-ACSR-WP-6X1' '1/0-ACSR-WP-6X1' '1/0-ACSR-B-6X1' ]
New Line.258850708 Phases= 3  Bus1=258850705.1.2.3 Bus2=258850710.1.2.3 Length=87.260000 units=m Spacing=HORIZ-LINE-POST-3PH wires=['336-ACSR-B-18X1' '336-ACSR-B-18X1' '336-ACSR-B-18X1' '1/0-ACSR-B-6X1' ]
New Line.258850521 Phases= 3  Bus1=258850518.1.2.3 Bus2=258850523.1.2.3 Length=21.990000 units=m Spacing=8'-ARM-NON-CENTER-POST-3PH wires=['336-ACSR-WP-18X1' '336-ACSR-WP-18X1' '336-ACSR-WP-18X1' '1/0-ACSR-WP-6X1' ]
New Line.258840322 Phases= 3  Bus1=258840312.1.2.3 Bus2=258840324.1.2.3 Length=21.790000 units=m Spacing=8'-ARM-NON-CENTER-POST-3PH wires=['1/0-ACSR-WP-6X1' '1/0-ACSR-WP-6X1' '1/0-ACSR-WP-6X1' '1/0-ACSR-B-6X1' ]
New Line.258851425 Phases= 1  Bus1=258851417.1 Bus2=258851427.1 Length=93.270000 units=m Spacing=VERTICAL-1-PH-60-1PH wires=['1/0-ACSR-WP-6X1' '2-ACSR-B-6X1' ]
New Line.258840509 Phases= 3  Bus1=258840506.1.2.3 Bus2=258840511.1.2.3 Length=135.700000 units=m Spacing=8'-ARM-STANDARD-3PH wires=['2-ACSR-B-6X1' '2-ACSR-B-6X1' '2-ACSR-B-6X1' '1/0-ACSR-B-6X1' ]
New Line.258851363 Phases= 3  Bus1=258851360.1.2.3 Bus2=258851365.1.2.3 Length=29.260000 units=m Spacing=8'-ARM-STANDARD-3PH wires=['1/0-ACSR-B-6X1' '1/0-ACSR-B-6X1' '1/0-ACSR-B-6X1' '1/0-ACSR-B-6X1' ]
New Line.258851420 Phases= 1  Bus1=258851417.1 Bus2=258851422.1 Length=113.400000 units=m Spacing=VERTICAL-1-PH-60-1PH wires=['1/0-ACSR-B-6X1' '1/0-ACSR-B-6X1' ]
New Line.264567411 Phases= 3  Bus1=264567408.1.2.3 Bus2=258850740.1.2.3 Length=7.870000 units=m Spacing=8'-ARM-NON-CENTER-POST-3PH wires=['2-ACSR-B-6X1' '2-ACSR-B-6X1' '2-ACSR-B-6X1' '2-ACSR-B-6X1' ]
New Line.258839919 Phases= 3  Bus1=258839916.1.2.3 Bus2=258839921.1.2.3 Length=47.430000 units=m Spacing=8'-ARM-NON-CENTER-POST-3PH wires=['336-ACSR-WP-18X1' '336-ACSR-WP-18X1' '336-ACSR-WP-18X1' '1/0-ACSR-B-6X1' ]
New Line.258840147 Phases= 3  Bus1=258840142.1.2.3 Bus2=258840149.1.2.3 Length=34.880000 units=m Spacing=8'-ARM-NON-CENTER-POST-3PH wires=['2-ACSR-B-6X1' '2-ACSR-B-6X1' '2-ACSR-B-6X1' '1/0-ACSR-B-6X1' ]
New Line.258850528 Phases= 3  Bus1=258850518.1.2.3 Bus2=258850530.1.2.3 Length=91.290000 units=m Spacing=DBL-CKT-1-ARM-ONE-SIDE-3PH wires=['336-ACSR-B-18X1' '336-ACSR-B-18X1' '336-AAC-B-19' '1/0-ACSR-B-6X1' ]
New Line.258840285 Phases= 3  Bus1=258840282.1.2.3 Bus2=258840287.1.2.3 Length=37.860000 units=m Spacing=8'-ARM-NON-CENTER-POST-3PH wires=['336-ACSR-B-18X1' '336-ACSR-B-18X1' '336-ACSR-B-18X1' '2-CU-B-7' ]
New Line.258851247 Phases= 3  Bus1=258851217.1.2.3 Bus2=258851249.1.2.3 Length=43.790000 units=m Spacing=8'-ARM-NON-CENTER-POST-3PH wires=['2-ACSR-B-6X1' '2-ACSR-B-6X1' '2-ACSR-B-6X1' '1/0-ACSR-B-6X1' ]
New Line.258840203 Phases= 3  Bus1=258840200.1.2.3 Bus2=258840205.1.2.3 Length=48.640000 units=m Spacing=8'-ARM-NON-CENTER-POST-3PH wires=['336-ACSR-B-18X1' '336-ACSR-B-18X1' '336-ACSR-B-18X1' '2-CU-B-7' ]
New Line.258851242 Phases= 1  Bus1=258851237.3 Bus2=258851244.3 Length=71.060000 units=m Spacing=VERTICAL-1-PH-60-1PH wires=['2-ACSR-B-6X1' '2-ACSR-B-6X1' ]
New Line.264494184 Phases= 3  Bus1=264494181.1.2.3 Bus2=258839911.1.2.3 Length=16.960000 units=m Spacing=8'-ARM-NON-CENTER-POST-3PH wires=['336-ACSR-WP-18X1' '336-ACSR-WP-18X1' '336-ACSR-WP-18X1' '1/0-ACSR-B-6X1' ]
New Line.258840280 Phases= 3  Bus1=258840277.1.2.3 Bus2=258840282.1.2.3 Length=19.060000 units=m Spacing=8'-ARM-NON-CENTER-POST-3PH wires=['336-ACSR-B-18X1' '336-ACSR-B-18X1' '336-ACSR-B-18X1' '2-CU-B-7' ]
New Line.258840025 Phases= 3  Bus1=258840022.1.2.3 Bus2=258840027.1.2.3 Length=8.570000 units=m Spacing=8'-ARM-NON-CENTER-POST-3PH wires=['336-ACSR-B-18X1' '336-ACSR-B-18X1' '336-ACSR-B-18X1' '2-CU-B-7' ]
New Line.258851067 Phases= 1  Bus1=258851064.3 Bus2=258851069.3 Length=64.090000 units=m Spacing=VERTICAL-1-PH-60-1PH wires=['2-ACSR-B-6X1' '2-ACSR-B-6X1' ]
New Line.263515042 Phases= 1  Bus1=263515039.3 Bus2=258851064.3 Length=69.230000 units=m Spacing=VERTICAL-1-PH-60-1PH wires=['2-ACSR-B-6X1' '2-ACSR-B-6X1' ]
New Line.258840208 Phases= 3  Bus1=258840209.1.2.3 Bus2=258840210.1.2.3 Length=20.350000 units=m Spacing=8'-ARM-NON-CENTER-POST-3PH wires=['336-ACSR-B-18X1' '336-ACSR-B-18X1' '336-ACSR-B-18X1' '2-CU-B-7' ]
New Line.258840020 Phases= 3  Bus1=258840017.1.2.3 Bus2=258840022.1.2.3 Length=60.780000 units=m Spacing=8'-ARM-NON-CENTER-POST-3PH wires=['336-ACSR-B-18X1' '336-ACSR-B-18X1' '336-ACSR-B-18X1' '2-CU-B-7' ]
New Line.264494188 Phases= 3  Bus1=258839995.1.2.3 Bus2=264494190.1.2.3 Length=1.520000 units=m Spacing=8'-ARM-NON-CENTER-POST-3PH wires=['336-ACSR-B-18X1' '336-ACSR-B-18X1' '336-ACSR-B-18X1' '2-CU-B-7' ]
New Line.258851346 Phases= 2  Bus1=258851343.1.3 Bus2=258851348.1.3 Length=218.400000 units=m Spacing=8'-ARM-STANDARD-2PH wires=['6-CU-B-S' '6-CU-B-S' '2-CU-B-7' ]
New Line.258840305 Phases= 3  Bus1=258840302.1.2.3 Bus2=258840307.1.2.3 Length=78.500000 units=m Spacing=8'-ARM-NON-CENTER-POST-3PH wires=['336-ACSR-B-18X1' '336-ACSR-B-18X1' '336-ACSR-B-18X1' '2-CU-B-7' ]
New Line.258851405 Phases= 2  Bus1=258851402.1.2 Bus2=258851407.1.2 Length=81.180000 units=m Spacing=8'-ARM-STANDARD-2PH wires=['6-CU-B-S' '6-CU-B-S' '2-CU-B-7' ]
New Line.258840300 Phases= 3  Bus1=258840297.1.2.3 Bus2=258840302.1.2.3 Length=21.370000 units=m Spacing=8'-ARM-NON-CENTER-POST-3PH wires=['336-ACSR-B-18X1' '336-ACSR-B-18X1' '336-ACSR-B-18X1' '2-CU-B-7' ]
New Line.259121513 Phases= 3  Bus1=259121514.1.2.3 Bus2=259121515.1.2.3 Length=44.430000 units=m Spacing=8'-ARM-STANDARD-3PH wires=['2-ACSR-B-6X1' '2-ACSR-B-6X1' '2-ACSR-B-6X1' '2-ACSR-B-6X1' ]
New Line.258851400 Phases= 2  Bus1=258851397.1.2 Bus2=258851402.1.2 Length=95.880000 units=m Spacing=8'-ARM-STANDARD-2PH wires=['6-CU-B-S' '6-CU-B-S' '2-CU-B-7' ]
New Line.258851481 Phases= 3  Bus1=258851476.1.2.3 Bus2=258851483.1.2.3 Length=40.460000 units=m Spacing=8'-ARM-NON-CENTER-POST-3PH wires=['2-ACSR-B-6X1' '2-ACSR-B-6X1' '2-ACSR-B-6X1' '2-ACSR-B-6X1' ]
New Line.258851341 Phases= 2  Bus1=258851338.1.3 Bus2=258851343.1.3 Length=6.560000 units=m Spacing=8'-ARM-STANDARD-2PH wires=['6-CU-B-S' '6-CU-B-S' '2-CU-B-7' ]
New Line.258850589 Phases= 3  Bus1=258850586.1.2.3 Bus2=258850591.1.2.3 Length=30.520000 units=m Spacing=8'-ARM-NON-CENTER-POST-3PH wires=['1/0-ACSR-B-6X1' '1/0-ACSR-B-6X1' '1/0-ACSR-B-6X1' '1/0-ACSR-B-6X1' ]
New Line.258840125 Phases= 2  Bus1=258840122.1.2 Bus2=258840127.1.2 Length=92.030000 units=m Spacing=8'-ARM-STANDARD-2PH wires=['4-CU-B-7' '4-CU-B-7' '1/0-ACSR-B-6X1' ]
New Line.258851225 Phases= 1  Bus1=258851222.3 Bus2=258851227.3 Length=74.550000 units=m Spacing=VERTICAL-1-PH-60-1PH wires=['2-ACSR-B-6X1' '2-ACSR-B-6X1' ]
New Line.258840120 Phases= 2  Bus1=258840079.1.2 Bus2=258840122.1.2 Length=28.910000 units=m Spacing=8'-ARM-STANDARD-2PH wires=['4-CU-B-7' '4-CU-B-7' '1/0-ACSR-B-6X1' ]
New Line.263515141 Phases= 2  Bus1=263515138.1.2 Bus2=258851377.1.2 Length=21.510000 units=m Spacing=8'-ARM-STANDARD-2PH wires=['6-CU-B-S' '6-CU-B-S' '2-CU-B-7' ]
New Line.263515145 Phases= 3  Bus1=258851372.1.2.3 Bus2=263515147.1.2.3 Length=1.530000 units=m Spacing=8'-ARM-STANDARD-3PH wires=['1/0-ACSR-B-6X1' '1/0-ACSR-B-6X1' '1/0-ACSR-B-6X1' '1/0-ACSR-B-6X1' ]
New Line.258840084 Phases= 1  Bus1=258840072.2 Bus2=258840086.2 Length=25.220000 units=m Spacing=VERTICAL-1-PH-60-1PH wires=['2-ACSR-B-6X1' '1/0-ACSR-B-6X1' ]
New Line.258851047 Phases= 1  Bus1=460932520.1 Bus2=258851049.1 Length=48.160000 units=m Spacing=VERTICAL-1-PH-60-1PH wires=['2-ACSR-B-6X1' '2-ACSR-B-6X1' ]
New Line.258851168 Phases= 3  Bus1=258851160.1.2.3 Bus2=258851170.1.2.3 Length=45.140000 units=m Spacing=8'-ARM-NON-CENTER-POST-3PH wires=['2-ACSR-B-6X1' '2-ACSR-B-6X1' '2-ACSR-B-6X1' '1/0-ACSR-B-6X1' ]
New Line.259200539 Phases= 3  Bus1=258840032.1.2.3 Bus2=258840036.1.2.3 Length=80.940000 units=m Spacing=8'-ARM-NON-CENTER-POST-3PH wires=['336-ACSR-B-18X1' '336-ACSR-B-18X1' '336-ACSR-B-18X1' '2-CU-B-7' ]
New Line.259371831 Phases= 3  Bus1=258840205.1.2.3 Bus2=258840209.1.2.3 Length=30.380000 units=m Spacing=8'-ARM-NON-CENTER-POST-3PH wires=['336-ACSR-B-18X1' '336-ACSR-B-18X1' '336-ACSR-B-18X1' '2-CU-B-7' ]
New Line.258851326 Phases= 2  Bus1=258851323.1.3 Bus2=258851328.1.3 Length=56.060000 units=m Spacing=8'-ARM-STANDARD-2PH wires=['6-CU-B-S' '6-CU-B-S' '2-CU-B-7' ]
New Line.259545336 Phases= 3  Bus1=259545333.1.2.3 Bus2=259545338.1.2.3 Length=53.720000 units=m Spacing=8'-ARM-STANDARD-3PH wires=['2-ACSR-B-6X1' '2-ACSR-B-6X1' '2-ACSR-B-6X1' '2-ACSR-B-6X1' ]
New Line.259223116 Phases= 3  Bus1=258840215.1.2.3 Bus2=258840219.1.2.3 Length=23.190000 units=m Spacing=8'-ARM-NON-CENTER-POST-3PH wires=['336-ACSR-B-18X1' '336-ACSR-B-18X1' '336-ACSR-B-18X1' '1/0-ACSR-B-6X1' ]
New Line.259357192 Phases= 3  Bus1=259357184.1.2.3 Bus2=259357188.1.2.3 Length=8.440000 units=m Spacing=8'-ARM-NON-CENTER-POST-3PH wires=['1/0-ACSR-WP-6X1' '1/0-ACSR-WP-6X1' '1/0-ACSR-WP-6X1' '2-ACSR-B-6X1' ]
New Line.258840105 Phases= 1  Bus1=258840100.2 Bus2=258840107.2 Length=61.030000 units=m Spacing=VERTICAL-1-PH-60-1PH wires=['2-ACSR-B-6X1' '2-ACSR-B-6X1' ]
New Line.258851286 Phases= 1  Bus1=258851283.1 Bus2=258851288.1 Length=48.020000 units=m Spacing=VERTICAL-1-PH-60-1PH wires=['2-ACSR-B-6X1' '2-ACSR-B-6X1' ]
New Line.258840183 Phases= 3  Bus1=258840164.1.2.3 Bus2=258840185.1.2.3 Length=95.720000 units=m Spacing=8'-ARM-NON-CENTER-POST-3PH wires=['336-ACSR-B-18X1' '336-ACSR-B-18X1' '336-ACSR-B-18X1' '2-CU-B-7' ]
New Line.258851205 Phases= 3  Bus1=258851202.1.2.3 Bus2=258851207.1.2.3 Length=19.560000 units=m Spacing=8'-ARM-NON-CENTER-POST-3PH wires=['2-ACSR-B-6X1' '2-ACSR-B-6X1' '2-ACSR-B-6X1' '1/0-ACSR-B-6X1' ]
New Line.258851143 Phases= 3  Bus1=258851138.1.2.3 Bus2=258851145.1.2.3 Length=44.010000 units=m Spacing=8'-ARM-NON-CENTER-POST-3PH wires=['2-ACSR-B-6X1' '2-ACSR-B-6X1' '2-ACSR-B-6X1' '1/0-ACSR-B-6X1' ]
New Line.258851200 Phases= 3  Bus1=258851197.1.2.3 Bus2=258851202.1.2.3 Length=3.100000 units=m Spacing=8'-ARM-NON-CENTER-POST-3PH wires=['2-ACSR-B-6X1' '2-ACSR-B-6X1' '2-ACSR-B-6X1' '1/0-ACSR-B-6X1' ]
New Line.258851281 Phases= 3  Bus1=258851278.1.2.3 Bus2=258851283.1.2.3 Length=40.250000 units=m Spacing=8'-ARM-NON-CENTER-POST-3PH wires=['2-ACSR-B-6X1' '2-ACSR-B-6X1' '2-ACSR-B-6X1' '2-ACSR-B-6X1' ]
New Line.263515127 Phases= 2  Bus1=258840190.1.3 Bus2=263515129.1.3 Length=1.530000 units=m Spacing=8'-ARM-STANDARD-2PH wires=['6-CU-B-S' '6-CU-B-S' '6-CU-B-S' ]
New Line.263515082 Phases= 1  Bus1=258851155.3 Bus2=263515084.3 Length=1.520000 units=m Spacing=VERTICAL-1-PH-60-1PH wires=['2-ACSR-B-6X1' '2-ACSR-B-6X1' ]
New Line.258840188 Phases= 2  Bus1=258840185.1.3 Bus2=258840190.1.3 Length=77.000000 units=m Spacing=8'-ARM-STANDARD-2PH wires=['6-CU-B-S' '6-CU-B-S' '2-CU-B-7' ]
New Line.258851022 Phases= 1  Bus1=258851019.2 Bus2=258851024.2 Length=59.130000 units=m Spacing=VERTICAL-1-PH-60-1PH wires=['2-ACSR-B-6X1' '2-ACSR-B-6X1' ]
New Line.258851148 Phases= 3  Bus1=258851145.1.2.3 Bus2=258851150.1.2.3 Length=50.290000 units=m Spacing=8'-ARM-NON-CENTER-POST-3PH wires=['2-ACSR-B-6X1' '2-ACSR-B-6X1' '2-ACSR-B-6X1' '1/0-ACSR-B-6X1' ]
New Line.263515001 Phases= 3  Bus1=258850970.1.2.3 Bus2=263515003.1.2.3 Length=1.520000 units=m Spacing=8'-ARM-NON-CENTER-POST-3PH wires=['2-ACSR-B-6X1' '2-ACSR-B-6X1' '2-ACSR-B-6X1' '2-ACSR-B-6X1' ]
New Line.263515006 Phases= 3  Bus1=263515003.1.2.3 Bus2=258850982.1.2.3 Length=69.080000 units=m Spacing=8'-ARM-NON-CENTER-POST-3PH wires=['2-ACSR-B-6X1' '2-ACSR-B-6X1' '2-ACSR-B-6X1' '2-ACSR-B-6X1' ]
New Line.263515087 Phases= 1  Bus1=263515084.3 Bus2=258851165.3 Length=74.550000 units=m Spacing=VERTICAL-1-PH-60-1PH wires=['2-ACSR-B-6X1' '2-ACSR-B-6X1' ]
New Line.258851385 Phases= 2  Bus1=258851382.1.2 Bus2=258851387.1.2 Length=50.870000 units=m Spacing=8'-ARM-STANDARD-2PH wires=['6-CU-B-S' '6-CU-B-S' '2-CU-B-7' ]
New Line.258851301 Phases= 3  Bus1=258851298.1.2.3 Bus2=258851303.1.2.3 Length=13.530000 units=m Spacing=8'-ARM-NON-CENTER-POST-3PH wires=['2-ACSR-B-6X1' '2-ACSR-B-6X1' '2-ACSR-B-6X1' '2-ACSR-B-6X1' ]
New Line.258851380 Phases= 2  Bus1=258851377.1.2 Bus2=258851382.1.2 Length=55.000000 units=m Spacing=8'-ARM-STANDARD-2PH wires=['6-CU-B-S' '6-CU-B-S' '2-CU-B-7' ]
New Line.258851126 Phases= 3  Bus1=258851123.1.2.3 Bus2=258851128.1.2.3 Length=64.170000 units=m Spacing=8'-ARM-NON-CENTER-POST-3PH wires=['2-ACSR-B-6X1' '2-ACSR-B-6X1' '2-ACSR-B-6X1' '2-ACSR-B-6X1' ]
New Line.263515100 Phases= 1  Bus1=258851212.3 Bus2=263515102.3 Length=1.530000 units=m Spacing=VERTICAL-1-PH-60-1PH wires=['2-ACSR-B-6X1' '2-ACSR-B-6X1' ]
New Line.258851121 Phases= 3  Bus1=258851113.1.2.3 Bus2=258851123.1.2.3 Length=90.980000 units=m Spacing=8'-ARM-NON-CENTER-POST-3PH wires=['2-ACSR-B-6X1' '2-ACSR-B-6X1' '2-ACSR-B-6X1' '1/0-ACSR-B-6X1' ]
New Line.263515105 Phases= 1  Bus1=263515102.3 Bus2=258851222.3 Length=7.530000 units=m Spacing=VERTICAL-1-PH-60-1PH wires=['2-ACSR-B-6X1' '2-ACSR-B-6X1' ]
New Line.258851007 Phases= 3  Bus1=258850999.1.2.3 Bus2=258851009.1.2.3 Length=44.890000 units=m Spacing=8'-ARM-NON-CENTER-POST-3PH wires=['2-ACSR-B-6X1' '2-ACSR-B-6X1' '2-ACSR-B-6X1' '2-ACSR-B-6X1' ]
New Line.258851002 Phases= 3  Bus1=258850999.1.2.3 Bus2=258851004.1.2.3 Length=29.300000 units=m Spacing=8'-ARM-NON-CENTER-POST-3PH wires=['2-ACSR-B-6X1' '2-ACSR-B-6X1' '2-ACSR-B-6X1' '2-ACSR-B-6X1' ]
New Line.258851082 Phases= 3  Bus1=258851079.1.2.3 Bus2=258851084.1.2.3 Length=62.260000 units=m Spacing=8'-ARM-NON-CENTER-POST-3PH wires=['2-ACSR-B-6X1' '2-ACSR-B-6X1' '2-ACSR-B-6X1' '1/0-ACSR-B-6X1' ]
New Line.259237098 Phases= 3  Bus1=259004984.1.2.3 Bus2=259004980.1.2.3 Length=92.150000 units=m Spacing=HORIZ-LINE-POST-3PH wires=['336-ACSR-WP-18X1' '336-ACSR-WP-18X1' '336-ACSR-WP-18X1' '1/0-ACSR-B-6X1' ]
New Line.258851089 Phases= 3  Bus1=258851084.1.2.3 Bus2=258851091.1.2.3 Length=45.000000 units=m Spacing=8'-ARM-NON-CENTER-POST-3PH wires=['2-ACSR-B-6X1' '2-ACSR-B-6X1' '2-ACSR-B-6X1' '1/0-ACSR-B-6X1' ]
New Line.263514862 Phases= 3  Bus1=263514859.1.2.3 Bus2=258850953.1.2.3 Length=39.770000 units=m Spacing=8'-ARM-NON-CENTER-POST-3PH wires=['2-ACSR-B-6X1' '2-ACSR-B-6X1' '2-ACSR-B-6X1' '2-ACSR-B-6X1' ]
New Line.258851106 Phases= 3  Bus1=258851103.1.2.3 Bus2=258851108.1.2.3 Length=20.750000 units=m Spacing=8'-ARM-NON-CENTER-POST-3PH wires=['2-ACSR-B-6X1' '2-ACSR-B-6X1' '2-ACSR-B-6X1' '1/0-ACSR-B-6X1' ]
New Line.263514866 Phases= 3  Bus1=258850650.1.2.3 Bus2=263514868.1.2.3 Length=1.530000 units=m Spacing=8'-ARM-NON-CENTER-POST-3PH wires=['2-ACSR-B-6X1' '2-ACSR-B-6X1' '2-ACSR-B-6X1' '2-ACSR-B-6X1' ]
New Line.258851183 Phases= 3  Bus1=258851180.1.2.3 Bus2=258851185.1.2.3 Length=22.160000 units=m Spacing=8'-ARM-NON-CENTER-POST-3PH wires=['2-ACSR-B-6X1' '2-ACSR-B-6X1' '2-ACSR-B-6X1' '1/0-ACSR-B-6X1' ]
New Line.258851101 Phases= 3  Bus1=258851096.1.2.3 Bus2=258851103.1.2.3 Length=74.450000 units=m Spacing=8'-ARM-NON-CENTER-POST-3PH wires=['2-ACSR-B-6X1' '2-ACSR-B-6X1' '2-ACSR-B-6X1' '1/0-ACSR-B-6X1' ]
New Line.258851188 Phases= 3  Bus1=258851180.1.2.3 Bus2=258851190.1.2.3 Length=51.350000 units=m Spacing=8'-ARM-NON-CENTER-POST-3PH wires=['2-ACSR-B-6X1' '2-ACSR-B-6X1' '2-ACSR-B-6X1' '2-ACSR-B-6X1' ]
New Line.263514848 Phases= 3  Bus1=258850633.1.2.3 Bus2=263514850.1.2.3 Length=1.530000 units=m Spacing=8'-ARM-NON-CENTER-POST-3PH wires=['2-ACSR-B-6X1' '2-ACSR-B-6X1' '2-ACSR-B-6X1' '2-ACSR-B-6X1' ]
New Line.258850963 Phases= 3  Bus1=258850960.1.2.3 Bus2=258850965.1.2.3 Length=24.360000 units=m Spacing=8'-ARM-NON-CENTER-POST-3PH wires=['2-ACSR-B-6X1' '2-ACSR-B-6X1' '2-ACSR-B-6X1' '2-ACSR-B-6X1' ]
New Line.288683098 Phases= 3  Bus1=288683093.1.2.3 Bus2=259357184.1.2.3 Length=4.060000 units=m Spacing=8'-ARM-NON-CENTER-POST-3PH wires=['1/0-ACSR-WP-6X1' '1/0-ACSR-WP-6X1' '1/0-ACSR-WP-6X1' '2-ACSR-B-6X1' ]
New Line.288683096 Phases= 3  Bus1=258840356.1.2.3 Bus2=288683092.1.2.3 Length=52.590000 units=m Spacing=8'-ARM-NON-CENTER-POST-3PH wires=['1/0-ACSR-WP-6X1' '1/0-ACSR-WP-6X1' '1/0-ACSR-WP-6X1' '2-ACSR-B-6X1' ]
New Line.259005070 Phases= 3  Bus1=259005065.1.2.3 Bus2=259005072.1.2.3 Length=70.090000 units=m Spacing=8'-ARM-STANDARD-3PH wires=['1/0-ACSR-B-6X1' '1/0-ACSR-B-6X1' '1/0-ACSR-B-6X1' '1/0-ACSR-B-6X1' ]
New Line.258850968 Phases= 3  Bus1=258850523.1.2.3 Bus2=258850970.1.2.3 Length=49.660000 units=m Spacing=8'-ARM-NON-CENTER-POST-3PH wires=['336-ACSR-WP-18X1' '336-ACSR-WP-18X1' '336-ACSR-WP-18X1' '1/0-ACSR-WP-6X1' ]
New Line.288683091 Phases= 3  Bus1=288683092.1.2.3 Bus2=288683093.1.2.3 Length=1.500000 units=m Spacing=8'-ARM-NON-CENTER-POST-3PH wires=['1/0-ACSR-WP-6X1' '1/0-ACSR-WP-6X1' '1/0-ACSR-WP-6X1' '2-ACSR-B-6X1' ]
New Line.264516152 Phases= 3  Bus1=258840000.1.2.3 Bus2=264516154.1.2.3 Length=1.530000 units=m Spacing=8'-ARM-NON-CENTER-POST-3PH wires=['336-ACSR-B-18X1' '336-ACSR-B-18X1' '336-ACSR-B-18X1' '1/0-ACSR-B-6X1' ]
New Line.260039956 Phases= 3  Bus1=258840361.1.2.3 Bus2=258840365.1.2.3 Length=30.930000 units=m Spacing=8'-ARM-STANDARD-3PH wires=['2-ACSR-B-6X1' '2-ACSR-B-6X1' '2-ACSR-B-6X1' '2-ACSR-B-6X1' ]
New Line.264516157 Phases= 3  Bus1=264516154.1.2.3 Bus2=258840005.1.2.3 Length=49.410000 units=m Spacing=8'-ARM-NON-CENTER-POST-3PH wires=['336-ACSR-B-18X1' '336-ACSR-B-18X1' '336-ACSR-B-18X1' '1/0-ACSR-B-6X1' ]
New Line.258850946 Phases= 3  Bus1=258850941.1.2.3 Bus2=258850948.1.2.3 Length=40.590000 units=m Spacing=8'-ARM-NON-CENTER-POST-3PH wires=['2-ACSR-B-6X1' '2-ACSR-B-6X1' '2-ACSR-B-6X1' '2-ACSR-B-6X1' ]
New Line.259005056 Phases= 3  Bus1=258850975.1.2.3 Bus2=259005051.1.2.3 Length=31.610000 units=m Spacing=8'-ARM-STANDARD-3PH wires=['336-ACSR-WP-18X1' '336-ACSR-WP-18X1' '336-ACSR-WP-18X1' '1/0-ACSR-WP-6X1' ]
New Line.263514884 Phases= 3  Bus1=258850710.1.2.3 Bus2=263514886.1.2.3 Length=1.530000 units=m Spacing=8'-ARM-NON-CENTER-POST-3PH wires=['2-ACSR-B-6X1' '2-ACSR-B-6X1' '2-ACSR-B-6X1' '2-ACSR-B-6X1' ]
New Line.263514889 Phases= 3  Bus1=263514886.1.2.3 Bus2=258850934.1.2.3 Length=94.210000 units=m Spacing=8'-ARM-NON-CENTER-POST-3PH wires=['2-ACSR-B-6X1' '2-ACSR-B-6X1' '2-ACSR-B-6X1' '2-ACSR-B-6X1' ]
New Line.460932562 Phases= 3  Bus1=460932563.1.2.3 Bus2=460932564.1.2.3 Length=26.160000 units=m Spacing=8'-ARM-NON-CENTER-POST-3PH wires=['2-ACSR-B-6X1' '2-ACSR-B-6X1' '2-ACSR-B-6X1' '2-ACSR-B-6X1' ]
New Line.460932566 Phases= 3  Bus1=258840430.1.2.3 Bus2=460932563.1.2.3 Length=57.340000 units=m Spacing=8'-ARM-NON-CENTER-POST-3PH wires=['336-ACSR-WP-18X1' '336-ACSR-WP-18X1' '336-ACSR-WP-18X1' '1/0-ACSR-B-6X1' ]
New Line.258850927 Phases= 3  Bus1=258850924.1.2.3 Bus2=258850929.1.2.3 Length=18.890000 units=m Spacing=8'-ARM-NON-CENTER-POST-3PH wires=['2-ACSR-B-6X1' '2-ACSR-B-6X1' '2-ACSR-B-6X1' '2-ACSR-B-6X1' ]
New Line.460932567 Phases= 3  Bus1=460932563.1.2.3 Bus2=258840439.1.2.3 Length=51.590000 units=m Spacing=8'-ARM-NON-CENTER-POST-3PH wires=['336-ACSR-WP-18X1' '336-ACSR-WP-18X1' '336-ACSR-WP-18X1' '1/0-ACSR-B-6X1' ]
New Line.258850922 Phases= 3  Bus1=258850917.1.2.3 Bus2=258850924.1.2.3 Length=19.840000 units=m Spacing=8'-ARM-NON-CENTER-POST-3PH wires=['2-ACSR-B-6X1' '2-ACSR-B-6X1' '2-ACSR-B-6X1' '2-ACSR-B-6X1' ]
New Line.259005034 Phases= 3  Bus1=259005036.1.2.3 Bus2=259005031.1.2.3 Length=61.320000 units=m Spacing=8'-ARM-STANDARD-3PH wires=['336-ACSR-B-18X1' '336-ACSR-B-18X1' '336-ACSR-B-18X1' '1/0-ACSR-B-6X1' ]
New Line.259172464 Phases= 3  Bus1=259172465.1.2.3 Bus2=259172460.1.2.3 Length=29.740000 units=m Spacing=8'-ARM-STANDARD-3PH wires=['1/0-ACSR-B-6X1' '1/0-ACSR-B-6X1' '1/0-ACSR-B-6X1' '1/0-ACSR-B-6X1' ]
New Line.259005039 Phases= 3  Bus1=259005041.1.2.3 Bus2=259005036.1.2.3 Length=54.640000 units=m Spacing=8'-ARM-STANDARD-3PH wires=['336-ACSR-B-18X1' '336-ACSR-B-18X1' '336-ACSR-B-18X1' '1/0-ACSR-B-6X1' ]
New Line.259983252 Phases= 1  Bus1=259371838.1 Bus2=259371842.1 Length=35.920000 units=m Spacing=VERTICAL-1-PH-104-1PH wires=['2-ACSR-B-6X1' '2-ACSR-B-6X1' ]
New Line.258850987 Phases= 3  Bus1=258850982.1.2.3 Bus2=258850989.1.2.3 Length=60.150000 units=m Spacing=8'-ARM-NON-CENTER-POST-3PH wires=['336-ACSR-WP-18X1' '336-ACSR-WP-18X1' '336-ACSR-WP-18X1' '1/0-ACSR-WP-6X1' ]
New Line.259005097 Phases= 3  Bus1=259005092.1.2.3 Bus2=259005099.1.2.3 Length=20.050000 units=m Spacing=8'-ARM-NON-CENTER-POST-3PH wires=['1/0-ACSR-B-6X1' '1/0-ACSR-B-6X1' '1/0-ACSR-B-6X1' '1/0-ACSR-B-6X1' ]
New Line.259005014 Phases= 3  Bus1=259005016.1.2.3 Bus2=259005009.1.2.3 Length=59.010000 units=m Spacing=HORIZ-LINE-POST-3PH wires=['336-ACSR-WP-18X1' '336-ACSR-WP-18X1' '336-ACSR-WP-18X1' '1/0-ACSR-B-6X1' ]
New Line.471228156 Phases= 3  Bus1=258840462.1.2.3 Bus2=471228158.1.2.3 Length=1.530000 units=m Spacing=8'-ARM-STANDARD-3PH wires=['2-ACSR-B-6X1' '2-ACSR-B-6X1' '2-ACSR-B-6X1' '1/0-ACSR-B-6X1' ]
New Line.259005090 Phases= 3  Bus1=259005087.1.2.3 Bus2=259005092.1.2.3 Length=92.100000 units=m Spacing=8'-ARM-STANDARD-3PH wires=['1/0-ACSR-B-6X1' '1/0-ACSR-B-6X1' '1/0-ACSR-B-6X1' '1/0-ACSR-B-6X1' ]
New Line.471228038 Phases= 1  Bus1=258840516.3 Bus2=258840521.3 Length=317.400000 units=m Spacing=VERTICAL-1-PH-60-1PH wires=['2-ACSR-B-6X1' '2-ACSR-B-6X1' ]
New Line.259005019 Phases= 3  Bus1=259005021.1.2.3 Bus2=259005016.1.2.3 Length=54.000000 units=m Spacing=8'-ARM-STANDARD-3PH wires=['336-ACSR-B-18X1' '336-ACSR-B-18X1' '336-ACSR-B-18X1' '1/0-ACSR-B-6X1' ]
New Line.460932524 Phases= 1  Bus1=258840413.1 Bus2=460932526.1 Length=1.510000 units=m Spacing=VERTICAL-1-PH-60-1PH wires=['2-ACSR-B-6X1' '2-ACSR-B-6X1' ]
New Line.263661079 Phases= 3  Bus1=263661076.1.2.3 Bus2=259005077.1.2.3 Length=52.780000 units=m Spacing=8'-ARM-STANDARD-3PH wires=['1/0-ACSR-B-6X1' '1/0-ACSR-B-6X1' '1/0-ACSR-B-6X1' '1/0-ACSR-B-6X1' ]
New Line.263661074 Phases= 3  Bus1=259005076.1.2.3 Bus2=263661076.1.2.3 Length=1.520000 units=m Spacing=8'-ARM-STANDARD-3PH wires=['1/0-ACSR-B-6X1' '1/0-ACSR-B-6X1' '1/0-ACSR-B-6X1' '1/0-ACSR-B-6X1' ]
New Line.460932529 Phases= 1  Bus1=460932526.1 Bus2=460932520.1 Length=47.920000 units=m Spacing=VERTICAL-1-PH-60-1PH wires=['2-ACSR-B-6X1' '2-ACSR-B-6X1' ]
New Line.264504391 Phases= 3  Bus1=258850730.1.2.3 Bus2=264504389.1.2.3 Length=60.900000 units=m Spacing=HORIZ-LINE-POST-3PH wires=['336-ACSR-B-18X1' '336-ACSR-B-18X1' '336-ACSR-B-18X1' '1/0-ACSR-B-6X1' ]
New Line.259004978 Phases= 3  Bus1=259004980.1.2.3 Bus2=259004973.1.2.3 Length=136.000000 units=m Spacing=HORIZ-LINE-POST-3PH wires=['336-ACSR-WP-18X1' '336-ACSR-WP-18X1' '336-ACSR-WP-18X1' '1/0-ACSR-B-6X1' ]
New Line.460932289 Phases= 1  Bus1=258840356.2 Bus2=460932291.2 Length=1.510000 units=m Spacing=VERTICAL-1-PH-60-1PH wires=['2-ACSR-B-6X1' '1/0-ACSR-B-6X1' ]
New Line.263511671 Phases= 3  Bus1=258839980.1.2.3 Bus2=263511673.1.2.3 Length=1.520000 units=m Spacing=8'-ARM-NON-CENTER-POST-3PH wires=['2-ACSR-B-6X1' '2-ACSR-B-6X1' '2-ACSR-B-6X1' '1/0-ACSR-B-6X1' ]
New Line.263511676 Phases= 3  Bus1=263511673.1.2.3 Bus2=258851451.1.2.3 Length=14.000000 units=m Spacing=8'-ARM-NON-CENTER-POST-3PH wires=['2-ACSR-B-6X1' '2-ACSR-B-6X1' '2-ACSR-B-6X1' '1/0-ACSR-B-6X1' ]
New Line.263862874 Phases= 1  Bus1=258840210.1 Bus2=263862876.1 Length=1.520000 units=m Spacing=VERTICAL-1-PH-104-1PH wires=['2-ACSR-B-6X1' '2-ACSR-B-6X1' ]
New Line.263862879 Phases= 1  Bus1=263862876.1 Bus2=259371838.1 Length=25.280000 units=m Spacing=VERTICAL-1-PH-104-1PH wires=['2-ACSR-B-6X1' '2-ACSR-B-6X1' ]
New Line.263511653 Phases= 3  Bus1=258839871.1.2.3 Bus2=263511655.1.2.3 Length=1.520000 units=m Spacing=8'-ARM-NON-CENTER-POST-3PH wires=['2-ACSR-B-6X1' '2-ACSR-B-6X1' '2-ACSR-B-6X1' '2-ACSR-B-6X1' ]
New Line.263511658 Phases= 3  Bus1=263511655.1.2.3 Bus2=258851488.1.2.3 Length=98.320000 units=m Spacing=8'-ARM-NON-CENTER-POST-3PH wires=['2-ACSR-B-6X1' '2-ACSR-B-6X1' '2-ACSR-B-6X1' '2-ACSR-B-6X1' ]
New Line.263511752 Phases= 1  Bus1=258840297.1 Bus2=263511754.1 Length=1.520000 units=m Spacing=VERTICAL-1-PH-60-1PH wires=['2-ACSR-B-6X1' '1/0-ACSR-B-6X1' ]
New Line.263511757 Phases= 1  Bus1=263511754.1 Bus2=258840383.1 Length=112.000000 units=m Spacing=VERTICAL-1-PH-60-1PH wires=['2-ACSR-B-6X1' '1/0-ACSR-B-6X1' ]
New Line.259004993 Phases= 3  Bus1=259004995.1.2.3 Bus2=259004990.1.2.3 Length=120.800000 units=m Spacing=HORIZ-LINE-POST-3PH wires=['336-ACSR-WP-18X1' '336-ACSR-WP-18X1' '336-ACSR-WP-18X1' '1/0-ACSR-B-6X1' ]
New Line.259586299 Phases= 1  Bus1=258851232.3 Bus2=259586301.3 Length=64.260000 units=m Spacing=VERTICAL-1-PH-104-1PH wires=['2-ACSR-B-6X1' '2-ACSR-B-6X1' ]
New Line.263511730 Phases= 1  Bus1=263511727.1 Bus2=258851308.1 Length=48.490000 units=m Spacing=VERTICAL-1-PH-60-1PH wires=['2-ACSR-B-6X1' '2-ACSR-B-6X1' ]
New Line.258840477 Phases= 3  Bus1=258840472.1.2.3 Bus2=258840479.1.2.3 Length=15.010000 units=m Spacing=8'-ARM-STANDARD-3PH wires=['2-ACSR-B-6X1' '2-ACSR-B-6X1' '2-ACSR-B-6X1' '1/0-ACSR-B-6X1' ]
New Line.258850673 Phases= 3  Bus1=258850670.1.2.3 Bus2=258850675.1.2.3 Length=18.960000 units=m Spacing=HORIZ-LINE-POST-3PH wires=['336-ACSR-B-18X1' '336-ACSR-B-18X1' '336-ACSR-B-18X1' '1/0-ACSR-B-6X1' ]
New Line.263511734 Phases= 3  Bus1=258840252.1.2.3 Bus2=263511736.1.2.3 Length=1.530000 units=m Spacing=8'-ARM-NON-CENTER-POST-3PH wires=['2-ACSR-B-6X1' '2-ACSR-B-6X1' '2-ACSR-B-6X1' '1/0-ACSR-B-6X1' ]
New Line.263511739 Phases= 3  Bus1=263511736.1.2.3 Bus2=258851079.1.2.3 Length=36.040000 units=m Spacing=8'-ARM-NON-CENTER-POST-3PH wires=['2-ACSR-B-6X1' '2-ACSR-B-6X1' '2-ACSR-B-6X1' '1/0-ACSR-B-6X1' ]
New Line.258850678 Phases= 3  Bus1=258850670.1.2.3 Bus2=258850680.1.2.3 Length=34.570000 units=m Spacing=8'-ARM-NON-CENTER-POST-3PH wires=['2-ACSR-B-6X1' '2-ACSR-B-6X1' '2-ACSR-B-6X1' '2-ACSR-B-6X1' ]
New Line.263511694 Phases= 3  Bus1=263511691.1.2.3 Bus2=258840132.1.2.3 Length=18.020000 units=m Spacing=8'-ARM-NON-CENTER-POST-3PH wires=['2-ACSR-B-6X1' '2-ACSR-B-6X1' '2-ACSR-B-6X1' '2-ACSR-B-6X1' ]
New Line.263645696 Phases= 3  Bus1=263645693.1.2.3 Bus2=258840472.1.2.3 Length=8.860000 units=m Spacing=8'-ARM-STANDARD-3PH wires=['2-ACSR-B-6X1' '2-ACSR-B-6X1' '2-ACSR-B-6X1' '1/0-ACSR-B-6X1' ]
New Line.263511698 Phases= 3  Bus1=258840042.1.2.3 Bus2=263511700.1.2.3 Length=1.530000 units=m Spacing=8'-ARM-NON-CENTER-POST-3PH wires=['2-ACSR-B-6X1' '2-ACSR-B-6X1' '2-ACSR-B-6X1' '2-ACSR-B-6X1' ]
New Line.258850773 Phases= 3  Bus1=258850770.1.2.3 Bus2=258850775.1.2.3 Length=31.720000 units=m Spacing=8'-ARM-NON-CENTER-POST-3PH wires=['2-ACSR-B-6X1' '2-ACSR-B-6X1' '2-ACSR-B-6X1' '2-ACSR-B-6X1' ]
New Line.263511793 Phases= 3  Bus1=263511790.1.2.3 Bus2=258851029.1.2.3 Length=58.450000 units=m Spacing=8'-ARM-NON-CENTER-POST-3PH wires=['2-ACSR-B-6X1' '2-ACSR-B-6X1' '2-ACSR-B-6X1' '2-ACSR-B-6X1' ]
New Line.258850653 Phases= 3  Bus1=258850650.1.2.3 Bus2=258850655.1.2.3 Length=235.000000 units=m Spacing=HORIZ-LINE-POST-3PH wires=['336-ACSR-B-18X1' '336-ACSR-B-18X1' '336-ACSR-B-18X1' '1/0-ACSR-B-6X1' ]
New Line.263511716 Phases= 3  Bus1=258840205.1.2.3 Bus2=263511718.1.2.3 Length=1.530000 units=m Spacing=8'-ARM-NON-CENTER-POST-3PH wires=['2-ACSR-B-6X1' '2-ACSR-B-6X1' '2-ACSR-B-6X1' '2-ACSR-B-6X1' ]
New Line.258840455 Phases= 3  Bus1=258840452.1.2.3 Bus2=258840457.1.2.3 Length=40.900000 units=m Spacing=8'-ARM-NON-CENTER-POST-3PH wires=['336-ACSR-WP-18X1' '336-ACSR-WP-18X1' '336-ACSR-WP-18X1' '1/0-ACSR-B-6X1' ]
New Line.258840450 Phases= 3  Bus1=258840440.1.2.3 Bus2=258840452.1.2.3 Length=133.200000 units=m Spacing=8'-ARM-NON-CENTER-POST-3PH wires=['336-ACSR-WP-18X1' '336-ACSR-WP-18X1' '336-ACSR-WP-18X1' '1/0-ACSR-B-6X1' ]
New Line.258839862 Phases= 3  Bus1=258839859.1.2.3 Bus2=258839864.1.2.3 Length=104.900000 units=m Spacing=8'-ARM-NON-CENTER-POST-3PH wires=['336-ACSR-B-18X1' '336-ACSR-B-18X1' '336-ACSR-B-18X1' '1/0-ACSR-B-6X1' ]
New Line.258850658 Phases= 3  Bus1=258850655.1.2.3 Bus2=258850660.1.2.3 Length=103.400000 units=m Spacing=HORIZ-LINE-POST-3PH wires=['336-ACSR-B-18X1' '336-ACSR-B-18X1' '336-ACSR-B-18X1' '1/0-ACSR-B-6X1' ]
New Line.258840275 Phases= 3  Bus1=258840272.1.2.3 Bus2=258840277.1.2.3 Length=41.890000 units=m Spacing=8'-ARM-NON-CENTER-POST-3PH wires=['336-ACSR-B-18X1' '336-ACSR-B-18X1' '336-ACSR-B-18X1' '2-CU-B-7' ]
New Line.258840270 Phases= 3  Bus1=258840267.1.2.3 Bus2=258840272.1.2.3 Length=35.930000 units=m Spacing=8'-ARM-NON-CENTER-POST-3PH wires=['336-ACSR-B-18X1' '336-ACSR-B-18X1' '336-ACSR-B-18X1' '2-CU-B-7' ]
New Line.263638670 Phases= 1  Bus1=263638667.3 Bus2=258840516.3 Length=121.400000 units=m Spacing=VERTICAL-1-PH-60-1PH wires=['2-ACSR-B-6X1' '2-ACSR-B-6X1' ]
New Line.258839869 Phases= 3  Bus1=258839864.1.2.3 Bus2=258839871.1.2.3 Length=197.800000 units=m Spacing=8'-ARM-NON-CENTER-POST-3PH wires=['336-ACSR-B-18X1' '336-ACSR-B-18X1' '336-ACSR-B-18X1' '1/0-ACSR-B-6X1' ]
New Line.258850753 Phases= 3  Bus1=258850754.1.2.3 Bus2=258850755.1.2.3 Length=4.800000 units=m Spacing=8'-ARM-NON-CENTER-POST-3PH wires=['2-ACSR-B-6X1' '2-ACSR-B-6X1' '2-ACSR-B-6X1' '2-ACSR-B-6X1' ]
New Line.258839966 Phases= 3  Bus1=258839958.1.2.3 Bus2=258839968.1.2.3 Length=34.170000 units=m Spacing=8'-ARM-NON-CENTER-POST-3PH wires=['336-ACSR-B-18X1' '336-ACSR-B-18X1' '336-ACSR-B-18X1' '1/0-ACSR-B-6X1' ]
New Line.263714475 Phases= 1  Bus1=258840219.1 Bus2=263714477.1 Length=1.520000 units=m Spacing=VERTICAL-1-PH-104-1PH wires=['2-ACSR-B-6X1' '2-ACSR-B-6X1' ]
New Line.258850636 Phases= 3  Bus1=258850633.1.2.3 Bus2=258850638.1.2.3 Length=19.530000 units=m Spacing=HORIZ-LINE-POST-3PH wires=['336-ACSR-B-18X1' '336-ACSR-B-18X1' '336-ACSR-B-18X1' '1/0-ACSR-B-6X1' ]
New Line.258850574 Phases= 3  Bus1=258850569.1.2.3 Bus2=258850576.1.2.3 Length=12.690000 units=m Spacing=8'-ARM-NON-CENTER-POST-3PH wires=['2-ACSR-B-6X1' '2-ACSR-B-6X1' '2-ACSR-B-6X1' '2-ACSR-B-6X1' ]
New Line.259360389 Phases= 3  Bus1=259172461.1.2.3 Bus2=259207082.1.2.3 Length=28.070000 units=m Spacing=8'-ARM-STANDARD-3PH wires=['1/0-ACSR-B-6X1' '1/0-ACSR-B-6X1' '1/0-ACSR-B-6X1' '1/0-ACSR-B-6X1' ]
New Line.258850758 Phases= 3  Bus1=258850745.1.2.3 Bus2=258850760.1.2.3 Length=11.140000 units=m Spacing=8'-ARM-NON-CENTER-POST-3PH wires=['2-ACSR-B-6X1' '2-ACSR-B-6X1' '2-ACSR-B-6X1' '2-ACSR-B-6X1' ]
New Line.258839961 Phases= 3  Bus1=258839958.1.2.3 Bus2=258839963.1.2.3 Length=15.440000 units=m Spacing=8'-ARM-STANDARD-3PH wires=['2-ACSR-B-6X1' '2-ACSR-B-6X1' '2-ACSR-B-6X1' '2-ACSR-B-6X1' ]
New Line.258840433 Phases= 3  Bus1=258840430.1.2.3 Bus2=258840435.1.2.3 Length=17.350000 units=m Spacing=8'-ARM-NON-CENTER-POST-3PH wires=['2-ACSR-B-6X1' '2-ACSR-B-6X1' '2-ACSR-B-6X1' '2-ACSR-B-6X1' ]
New Line.258839845 Phases= 3  Bus1=258839840.1.2.3 Bus2=258839847.1.2.3 Length=13.480000 units=m Spacing=8'-ARM-NON-CENTER-POST-3PH wires=['336-ACSR-B-18X1' '336-ACSR-B-18X1' '336-ACSR-B-18X1' '1/0-ACSR-B-6X1' ]
New Line.258850579 Phases= 3  Bus1=258850569.1.2.3 Bus2=258850581.1.2.3 Length=24.370000 units=m Spacing=8'-ARM-NON-CENTER-POST-3PH wires=['336-ACSR-B-18X1' '336-ACSR-B-18X1' '336-ACSR-B-18X1' '1/0-ACSR-B-6X1' ]
New Line.258840255 Phases= 3  Bus1=258840252.1.2.3 Bus2=258840257.1.2.3 Length=55.700000 units=m Spacing=8'-ARM-NON-CENTER-POST-3PH wires=['336-ACSR-B-18X1' '336-ACSR-B-18X1' '336-ACSR-B-18X1' '2-CU-B-7' ]
New Line.263973893 Phases= 3  Bus1=263973890.1.2.3 Bus2=258850975.1.2.3 Length=32.380000 units=m Spacing=8'-ARM-NON-CENTER-POST-3PH wires=['336-ACSR-WP-18X1' '336-ACSR-WP-18X1' '336-ACSR-WP-18X1' '1/0-ACSR-B-6X1' ]
New Line.258840438 Phases= 3  Bus1=258840439.1.2.3 Bus2=258840440.1.2.3 Length=38.120000 units=m Spacing=8'-ARM-NON-CENTER-POST-3PH wires=['336-ACSR-WP-18X1' '336-ACSR-WP-18X1' '336-ACSR-WP-18X1' '1/0-ACSR-B-6X1' ]
New Line.258840250 Phases= 3  Bus1=258840247.1.2.3 Bus2=258840252.1.2.3 Length=84.990000 units=m Spacing=8'-ARM-NON-CENTER-POST-3PH wires=['336-ACSR-B-18X1' '336-ACSR-B-18X1' '336-ACSR-B-18X1' '2-CU-B-7' ]
New Line.264494230 Phases= 3  Bus1=264494227.1.2.3 Bus2=258840297.1.2.3 Length=38.230000 units=m Spacing=8'-ARM-NON-CENTER-POST-3PH wires=['336-ACSR-B-18X1' '336-ACSR-B-18X1' '336-ACSR-B-18X1' '2-CU-B-7' ]
New Line.258840077 Phases= 2  Bus1=258840072.1.2 Bus2=258840079.1.2 Length=37.910000 units=m Spacing=8'-ARM-STANDARD-2PH wires=['4-CU-B-7' '4-CU-B-7' '1/0-ACSR-B-6X1' ]
New Line.258840534 Phases= 1  Bus1=258840531.3 Bus2=258840536.3 Length=14.540000 units=m Spacing=VERTICAL-1-PH-60-1PH wires=['2-ACSR-B-6X1' '1/0-ACSR-B-6X1' ]
New Line.258839946 Phases= 3  Bus1=258839943.1.2.3 Bus2=258839948.1.2.3 Length=25.100000 units=m Spacing=8'-ARM-NON-CENTER-POST-3PH wires=['336-ACSR-WP-18X1' '336-ACSR-WP-18X1' '336-ACSR-WP-18X1' '1/0-ACSR-B-6X1' ]
New Line.258850616 Phases= 3  Bus1=258850613.1.2.3 Bus2=258850618.1.2.3 Length=34.220000 units=m Spacing=8'-ARM-NON-CENTER-POST-3PH wires=['1/0-ACSR-B-6X1' '1/0-ACSR-B-6X1' '1/0-ACSR-B-6X1' '1/0-ACSR-B-6X1' ]
New Line.258850557 Phases= 3  Bus1=258850554.1.2.3 Bus2=258850559.1.2.3 Length=6.150000 units=m Spacing=HORIZ-LINE-POST-3PH wires=['336-ACSR-B-18X1' '336-ACSR-B-18X1' '336-ACSR-B-18X1' '1/0-ACSR-B-6X1' ]
New Line.258840497 Phases= 3  Bus1=258840494.1.2.3 Bus2=258840499.1.2.3 Length=13.790000 units=m Spacing=8'-ARM-STANDARD-3PH wires=['2-ACSR-B-6X1' '2-ACSR-B-6X1' '2-ACSR-B-6X1' '1/0-ACSR-B-6X1' ]
New Line.258850552 Phases= 3  Bus1=258850549.1.2.3 Bus2=258850554.1.2.3 Length=21.320000 units=m Spacing=HORIZ-LINE-POST-3PH wires=['336-ACSR-B-18X1' '336-ACSR-B-18X1' '336-ACSR-B-18X1' '1/0-ACSR-B-6X1' ]
New Line.258850693 Phases= 3  Bus1=258850690.1.2.3 Bus2=258850695.1.2.3 Length=34.050000 units=m Spacing=HORIZ-LINE-POST-3PH wires=['336-ACSR-B-18X1' '336-ACSR-B-18X1' '336-ACSR-B-18X1' '1/0-ACSR-B-6X1' ]
New Line.264494179 Phases= 3  Bus1=258839906.1.2.3 Bus2=264494181.1.2.3 Length=1.520000 units=m Spacing=8'-ARM-NON-CENTER-POST-3PH wires=['336-ACSR-WP-18X1' '336-ACSR-WP-18X1' '336-ACSR-WP-18X1' '1/0-ACSR-B-6X1' ]
New Line.258839941 Phases= 3  Bus1=258839936.1.2.3 Bus2=258839943.1.2.3 Length=28.070000 units=m Spacing=8'-ARM-NON-CENTER-POST-3PH wires=['336-ACSR-WP-18X1' '336-ACSR-WP-18X1' '336-ACSR-WP-18X1' '1/0-ACSR-B-6X1' ]
New Line.258840354 Phases= 3  Bus1=258840351.1.2.3 Bus2=258840356.1.2.3 Length=39.840000 units=m Spacing=8'-ARM-NON-CENTER-POST-3PH wires=['1/0-ACSR-WP-6X1' '1/0-ACSR-WP-6X1' '1/0-ACSR-WP-6X1' '1/0-ACSR-B-6X1' ]
New Line.263761831 Phases= 3  Bus1=258840011.1.2.3 Bus2=263761833.1.2.3 Length=1.530000 units=m Spacing=8'-ARM-NON-CENTER-POST-3PH wires=['336-ACSR-B-18X1' '336-ACSR-B-18X1' '336-ACSR-B-18X1' '2-CU-B-7' ]
New Line.258850611 Phases= 3  Bus1=258850608.1.2.3 Bus2=258850613.1.2.3 Length=72.850000 units=m Spacing=8'-ARM-NON-CENTER-POST-3PH wires=['1/0-ACSR-B-6X1' '1/0-ACSR-B-6X1' '1/0-ACSR-B-6X1' '1/0-ACSR-B-6X1' ]
New Line.258851457 Phases= 3  Bus1=258851452.1.2.3 Bus2=258851459.1.2.3 Length=58.380000 units=m Spacing=8'-ARM-NON-CENTER-POST-3PH wires=['2-ACSR-B-6X1' '2-ACSR-B-6X1' '2-ACSR-B-6X1' '1/0-ACSR-B-6X1' ]
New Line.263761836 Phases= 3  Bus1=263761833.1.2.3 Bus2=258840012.1.2.3 Length=19.510000 units=m Spacing=8'-ARM-NON-CENTER-POST-3PH wires=['336-ACSR-B-18X1' '336-ACSR-B-18X1' '336-ACSR-B-18X1' '2-CU-B-7' ]
New Line.258840539 Phases= 1  Bus1=258840536.3 Bus2=258840541.3 Length=65.100000 units=m Spacing=VERTICAL-1-PH-60-1PH wires=['2-ACSR-B-6X1' '1/0-ACSR-B-6X1' ]
New Line.258840411 Phases= 3  Bus1=258840408.1.2.3 Bus2=258840413.1.2.3 Length=55.660000 units=m Spacing=8'-ARM-NON-CENTER-POST-3PH wires=['336-ACSR-WP-18X1' '336-ACSR-WP-18X1' '336-ACSR-WP-18X1' '1/0-ACSR-B-6X1' ]
New Line.258851450 Phases= 3  Bus1=258851451.1.2.3 Bus2=258851452.1.2.3 Length=46.120000 units=m Spacing=8'-ARM-NON-CENTER-POST-3PH wires=['2-ACSR-B-6X1' '2-ACSR-B-6X1' '2-ACSR-B-6X1' '1/0-ACSR-B-6X1' ]
New Line.258850698 Phases= 3  Bus1=258850695.1.2.3 Bus2=258850700.1.2.3 Length=26.910000 units=m Spacing=HORIZ-LINE-POST-3PH wires=['336-ACSR-B-18X1' '336-ACSR-B-18X1' '336-ACSR-B-18X1' '1/0-ACSR-B-6X1' ]
New Line.258851276 Phases= 3  Bus1=258851261.1.2.3 Bus2=258851278.1.2.3 Length=33.820000 units=m Spacing=8'-ARM-NON-CENTER-POST-3PH wires=['2-ACSR-B-6X1' '2-ACSR-B-6X1' '2-ACSR-B-6X1' '2-ACSR-B-6X1' ]
New Line.264494216 Phases= 3  Bus1=258840272.1.2.3 Bus2=264494218.1.2.3 Length=1.530000 units=m Spacing=8'-ARM-NON-CENTER-POST-3PH wires=['336-ACSR-WP-18X1' '336-ACSR-WP-18X1' '336-ACSR-WP-18X1' '1/0-ACSR-B-6X1' ]
New Line.258840233 Phases= 3  Bus1=258840230.1.2.3 Bus2=258840235.1.2.3 Length=40.320000 units=m Spacing=8'-ARM-NON-CENTER-POST-3PH wires=['336-ACSR-B-18X1' '336-ACSR-B-18X1' '336-ACSR-B-18X1' '2-CU-B-7' ]
New Line.258840359 Phases= 3  Bus1=258840356.1.2.3 Bus2=258840361.1.2.3 Length=33.330000 units=m Spacing=8'-ARM-NON-CENTER-POST-3PH wires=['1/0-ACSR-WP-6X1' '1/0-ACSR-WP-6X1' '1/0-ACSR-WP-6X1' '1/0-ACSR-B-6X1' ]
New Line.258851271 Phases= 3  Bus1=258851268.1.2.3 Bus2=258851273.1.2.3 Length=25.600000 units=m Spacing=8'-ARM-NON-CENTER-POST-3PH wires=['2-ACSR-B-6X1' '2-ACSR-B-6X1' '2-ACSR-B-6X1' '1/0-ACSR-B-6X1' ]
New Line.258850713 Phases= 3  Bus1=258850710.1.2.3 Bus2=258850715.1.2.3 Length=45.440000 units=m Spacing=HORIZ-LINE-POST-3PH wires=['336-ACSR-B-18X1' '336-ACSR-B-18X1' '336-ACSR-B-18X1' '1/0-ACSR-B-6X1' ]
New Line.258840055 Phases= 3  Bus1=258840052.1.2.3 Bus2=258840057.1.2.3 Length=105.300000 units=m Spacing=8'-ARM-NON-CENTER-POST-3PH wires=['336-ACSR-B-18X1' '336-ACSR-B-18X1' '336-ACSR-B-18X1' '2-CU-B-7' ]
New Line.258839924 Phases= 3  Bus1=258839921.1.2.3 Bus2=258839926.1.2.3 Length=56.940000 units=m Spacing=8'-ARM-NON-CENTER-POST-3PH wires=['336-ACSR-WP-18X1' '336-ACSR-WP-18X1' '336-ACSR-WP-18X1' '1/0-ACSR-B-6X1' ]
New Line.258850535 Phases= 3  Bus1=258850530.1.2.3 Bus2=258850537.1.2.3 Length=22.640000 units=m Spacing=HORIZ-LINE-POST-3PH wires=['336-ACSR-B-18X1' '336-ACSR-B-18X1' '336-ACSR-B-18X1' '1/0-ACSR-B-6X1' ]
New Line.258840337 Phases= 3  Bus1=258840334.1.2.3 Bus2=258840339.1.2.3 Length=34.030000 units=m Spacing=8'-ARM-NON-CENTER-POST-3PH wires=['1/0-ACSR-WP-6X1' '1/0-ACSR-WP-6X1' '1/0-ACSR-WP-6X1' '1/0-ACSR-B-6X1' ]
New Line.258850718 Phases= 3  Bus1=258850715.1.2.3 Bus2=258850720.1.2.3 Length=46.610000 units=m Spacing=HORIZ-LINE-POST-3PH wires=['336-ACSR-B-18X1' '336-ACSR-B-18X1' '336-ACSR-B-18X1' '1/0-ACSR-B-6X1' ]
New Line.258840332 Phases= 3  Bus1=258840329.1.2.3 Bus2=258840334.1.2.3 Length=3.080000 units=m Spacing=8'-ARM-NON-CENTER-POST-3PH wires=['1/0-ACSR-WP-6X1' '1/0-ACSR-WP-6X1' '1/0-ACSR-WP-6X1' '1/0-ACSR-B-6X1' ]
New Line.258851435 Phases= 1  Bus1=258851392.2 Bus2=258851437.2 Length=19.450000 units=m Spacing=VERTICAL-1-PH-60-1PH wires=['2-ACSR-B-6X1' '2-CU-B-7' ]
New Line.258839884 Phases= 3  Bus1=258839881.1.2.3 Bus2=258839886.1.2.3 Length=70.210000 units=m Spacing=8'-ARM-NON-CENTER-POST-3PH wires=['336-ACSR-B-18X1' '336-ACSR-B-18X1' '336-ACSR-B-18X1' '1/0-ACSR-B-6X1' ]
New Line.258851370 Phases= 3  Bus1=258851365.1.2.3 Bus2=258851372.1.2.3 Length=45.530000 units=m Spacing=8'-ARM-STANDARD-3PH wires=['1/0-ACSR-B-6X1' '1/0-ACSR-B-6X1' '1/0-ACSR-B-6X1' '1/0-ACSR-B-6X1' ]
New Line.258851430 Phases= 1  Bus1=258851422.1 Bus2=258851432.1 Length=38.250000 units=m Spacing=VERTICAL-1-PH-60-1PH wires=['2-ACSR-B-6X1' '2-ACSR-B-6X1' ]
New Line.258839929 Phases= 3  Bus1=258839926.1.2.3 Bus2=258839931.1.2.3 Length=6.280000 units=m Spacing=8'-ARM-NON-CENTER-POST-3PH wires=['336-ACSR-WP-18X1' '336-ACSR-WP-18X1' '336-ACSR-WP-18X1' '1/0-ACSR-B-6X1' ]
New Line.258840157 Phases= 3  Bus1=258840154.1.2.3 Bus2=258840159.1.2.3 Length=38.270000 units=m Spacing=8'-ARM-NON-CENTER-POST-3PH wires=['336-ACSR-B-18X1' '336-ACSR-B-18X1' '336-ACSR-B-18X1' '2-CU-B-7' ]
New Line.264567406 Phases= 3  Bus1=258850730.1.2.3 Bus2=264567408.1.2.3 Length=1.530000 units=m Spacing=8'-ARM-NON-CENTER-POST-3PH wires=['2-ACSR-B-6X1' '2-ACSR-B-6X1' '2-ACSR-B-6X1' '2-ACSR-B-6X1' ]
New Line.258840152 Phases= 3  Bus1=258840005.1.2.3 Bus2=258840154.1.2.3 Length=149.600000 units=m Spacing=8'-ARM-NON-CENTER-POST-3PH wires=['336-ACSR-B-18X1' '336-ACSR-B-18X1' '336-ACSR-B-18X1' '2-CU-B-7' ]
New Line.258840213 Phases= 3  Bus1=258840210.1.2.3 Bus2=258840215.1.2.3 Length=32.900000 units=m Spacing=8'-ARM-NON-CENTER-POST-3PH wires=['336-ACSR-B-18X1' '336-ACSR-B-18X1' '336-ACSR-B-18X1' '2-CU-B-7' ]
New Line.258851252 Phases= 3  Bus1=258851249.1.2.3 Bus2=258851254.1.2.3 Length=50.460000 units=m Spacing=8'-ARM-NON-CENTER-POST-3PH wires=['2-ACSR-B-6X1' '2-ACSR-B-6X1' '2-ACSR-B-6X1' '2-ACSR-B-6X1' ]
New Line.258840290 Phases= 3  Bus1=258840287.1.2.3 Bus2=258840292.1.2.3 Length=18.540000 units=m Spacing=8'-ARM-NON-CENTER-POST-3PH wires=['336-ACSR-B-18X1' '336-ACSR-B-18X1' '336-ACSR-B-18X1' '2-CU-B-7' ]
New Line.258839889 Phases= 3  Bus1=258839886.1.2.3 Bus2=258839891.1.2.3 Length=45.720000 units=m Spacing=8'-ARM-NON-CENTER-POST-3PH wires=['336-ACSR-B-18X1' '336-ACSR-B-18X1' '336-ACSR-B-18X1' '1/0-ACSR-B-6X1' ]
New Line.258840035 Phases= 3  Bus1=258840036.1.2.3 Bus2=258840037.1.2.3 Length=96.650000 units=m Spacing=8'-ARM-NON-CENTER-POST-3PH wires=['336-ACSR-B-18X1' '336-ACSR-B-18X1' '336-ACSR-B-18X1' '2-CU-B-7' ]
New Line.258840218 Phases= 3  Bus1=258840219.1.2.3 Bus2=258840220.1.2.3 Length=123.900000 units=m Spacing=8'-ARM-NON-CENTER-POST-3PH wires=['336-ACSR-B-18X1' '336-ACSR-B-18X1' '336-ACSR-B-18X1' '1/0-ACSR-B-6X1' ]
New Line.258850516 Phases= 3  Bus1=258840467.1.2.3 Bus2=258850518.1.2.3 Length=135.400000 units=m Spacing=8'-ARM-NON-CENTER-POST-3PH wires=['336-ACSR-WP-18X1' '336-ACSR-WP-18X1' '336-ACSR-WP-18X1' '1/0-ACSR-B-6X1' ]
New Line.258839904 Phases= 3  Bus1=258839901.1.2.3 Bus2=258839906.1.2.3 Length=22.410000 units=m Spacing=8'-ARM-NON-CENTER-POST-3PH wires=['336-ACSR-WP-18X1' '336-ACSR-WP-18X1' '336-ACSR-WP-18X1' '1/0-ACSR-B-6X1' ]
New Line.258840030 Phases= 3  Bus1=258840027.1.2.3 Bus2=258840032.1.2.3 Length=68.070000 units=m Spacing=8'-ARM-NON-CENTER-POST-3PH wires=['336-ACSR-B-18X1' '336-ACSR-B-18X1' '336-ACSR-B-18X1' '2-CU-B-7' ]
New Line.258851072 Phases= 1  Bus1=258851069.3 Bus2=258851074.3 Length=76.630000 units=m Spacing=VERTICAL-1-PH-60-1PH wires=['2-ACSR-B-6X1' '2-ACSR-B-6X1' ]
New Line.258839983 Phases= 3  Bus1=258839980.1.2.3 Bus2=258839985.1.2.3 Length=155.800000 units=m Spacing=8'-ARM-NON-CENTER-POST-3PH wires=['336-ACSR-B-18X1' '336-ACSR-B-18X1' '336-ACSR-B-18X1' '1/0-ACSR-B-6X1' ]
New Line.258850594 Phases= 3  Bus1=258850591.1.2.3 Bus2=258850596.1.2.3 Length=26.430000 units=m Spacing=8'-ARM-NON-CENTER-POST-3PH wires=['1/0-ACSR-B-6X1' '1/0-ACSR-B-6X1' '1/0-ACSR-B-6X1' '1/0-ACSR-B-6X1' ]
New Line.258851259 Phases= 3  Bus1=258851249.1.2.3 Bus2=258851261.1.2.3 Length=24.090000 units=m Spacing=8'-ARM-NON-CENTER-POST-3PH wires=['2-ACSR-B-6X1' '2-ACSR-B-6X1' '2-ACSR-B-6X1' '2-ACSR-B-6X1' ]
New Line.258840396 Phases= 3  Bus1=258840397.1.2.3 Bus2=258840398.1.2.3 Length=49.240000 units=m Spacing=8'-ARM-NON-CENTER-POST-3PH wires=['336-ACSR-WP-18X1' '336-ACSR-WP-18X1' '336-ACSR-WP-18X1' '1/0-ACSR-B-6X1' ]
New Line.258840315 Phases= 3  Bus1=258840312.1.2.3 Bus2=258840317.1.2.3 Length=24.010000 units=m Spacing=8'-ARM-NON-CENTER-POST-3PH wires=['336-ACSR-B-18X1' '336-ACSR-B-18X1' '336-ACSR-B-18X1' '2-CU-B-7' ]
New Line.258851415 Phases= 1  Bus1=258851412.1 Bus2=258851417.1 Length=23.350000 units=m Spacing=VERTICAL-1-PH-60-1PH wires=['1/0-ACSR-WP-6X1' '2-ACSR-B-6X1' ]
New Line.258840310 Phases= 3  Bus1=258840307.1.2.3 Bus2=258840312.1.2.3 Length=53.230000 units=m Spacing=8'-ARM-NON-CENTER-POST-3PH wires=['336-ACSR-B-18X1' '336-ACSR-B-18X1' '336-ACSR-B-18X1' '2-CU-B-7' ]
New Line.258840391 Phases= 3  Bus1=258840388.1.2.3 Bus2=258840393.1.2.3 Length=6.000000 units=m Spacing=8'-ARM-NON-CENTER-POST-3PH wires=['336-ACSR-WP-18X1' '336-ACSR-WP-18X1' '336-ACSR-WP-18X1' '1/0-ACSR-B-6X1' ]
New Line.258851353 Phases= 2  Bus1=258851348.1.3 Bus2=258851355.1.3 Length=93.980000 units=m Spacing=8'-ARM-STANDARD-2PH wires=['6-CU-B-S' '6-CU-B-S' '2-CU-B-7' ]
New Line.258851410 Phases= 2  Bus1=258851407.1.2 Bus2=258851412.1.2 Length=71.880000 units=m Spacing=8'-ARM-STANDARD-2PH wires=['6-CU-B-S' '6-CU-B-S' '2-CU-B-7' ]
New Line.258839988 Phases= 3  Bus1=258839985.1.2.3 Bus2=258839990.1.2.3 Length=71.490000 units=m Spacing=8'-ARM-NON-CENTER-POST-3PH wires=['336-ACSR-B-18X1' '336-ACSR-B-18X1' '336-ACSR-B-18X1' '1/0-ACSR-B-6X1' ]
New Line.258840135 Phases= 3  Bus1=258840132.1.2.3 Bus2=258840137.1.2.3 Length=11.480000 units=m Spacing=8'-ARM-NON-CENTER-POST-3PH wires=['2-ACSR-B-6X1' '2-ACSR-B-6X1' '2-ACSR-B-6X1' '2-ACSR-B-6X1' ]
New Line.264494197 Phases= 3  Bus1=258840047.1.2.3 Bus2=264494199.1.2.3 Length=1.530000 units=m Spacing=8'-ARM-NON-CENTER-POST-3PH wires=['336-ACSR-B-18X1' '336-ACSR-B-18X1' '336-ACSR-B-18X1' '2-CU-B-7' ]
New Line.258851173 Phases= 1  Bus1=258851170.1 Bus2=258851175.1 Length=22.510000 units=m Spacing=VERTICAL-1-PH-60-1PH wires=['1/0-ACSR-B-6X1' '1/0-ACSR-B-6X1' ]
New Line.258851358 Phases= 3  Bus1=258840178.1.2.3 Bus2=258851360.1.2.3 Length=15.880000 units=m Spacing=8'-ARM-STANDARD-3PH wires=['1/0-ACSR-B-6X1' '1/0-ACSR-B-6X1' '1/0-ACSR-B-6X1' '1/0-ACSR-B-6X1' ]
New Line.264494193 Phases= 3  Bus1=264494190.1.2.3 Bus2=258840000.1.2.3 Length=100.100000 units=m Spacing=8'-ARM-NON-CENTER-POST-3PH wires=['336-ACSR-B-18X1' '336-ACSR-B-18X1' '336-ACSR-B-18X1' '2-CU-B-7' ]
New Line.258851230 Phases= 1  Bus1=258851227.3 Bus2=258851232.3 Length=67.690000 units=m Spacing=VERTICAL-1-PH-60-1PH wires=['2-ACSR-B-6X1' '2-ACSR-B-6X1' ]
New Line.258840015 Phases= 3  Bus1=258840012.1.2.3 Bus2=258840017.1.2.3 Length=71.810000 units=m Spacing=8'-ARM-NON-CENTER-POST-3PH wires=['336-ACSR-B-18X1' '336-ACSR-B-18X1' '336-ACSR-B-18X1' '2-CU-B-7' ]
New Line.258851057 Phases= 3  Bus1=258851054.1.2.3 Bus2=258851059.1.2.3 Length=16.360000 units=m Spacing=8'-ARM-NON-CENTER-POST-3PH wires=['2-ACSR-B-6X1' '2-ACSR-B-6X1' '2-ACSR-B-6X1' '2-ACSR-B-6X1' ]
New Line.258840091 Phases= 3  Bus1=258840072.1.2.3 Bus2=258840093.1.2.3 Length=33.370000 units=m Spacing=8'-ARM-NON-CENTER-POST-3PH wires=['2-ACSR-B-6X1' '4-CU-B-7' '2-ACSR-B-6X1' '2-CU-B-7' ]
New Line.258851178 Phases= 3  Bus1=258851170.1.2.3 Bus2=258851180.1.2.3 Length=57.260000 units=m Spacing=8'-ARM-NON-CENTER-POST-3PH wires=['2-ACSR-B-6X1' '2-ACSR-B-6X1' '2-ACSR-B-6X1' '1/0-ACSR-B-6X1' ]
New Line.259371841 Phases= 1  Bus1=259371842.1 Bus2=259371843.1 Length=45.500000 units=m Spacing=VERTICAL-1-PH-104-1PH wires=['2-ACSR-B-6X1' '2-ACSR-B-6X1' ]
New Line.259371846 Phases= 1  Bus1=259371843.1 Bus2=259371848.1 Length=83.020000 units=m Spacing=VERTICAL-1-PH-104-1PH wires=['2-ACSR-B-6X1' '2-ACSR-B-6X1' ]
New Line.258851336 Phases= 2  Bus1=258851328.1.3 Bus2=258851338.1.3 Length=51.180000 units=m Spacing=8'-ARM-STANDARD-2PH wires=['6-CU-B-S' '6-CU-B-S' '2-CU-B-7' ]
New Line.258840098 Phases= 1  Bus1=258840093.2 Bus2=258840100.2 Length=32.840000 units=m Spacing=VERTICAL-1-PH-60-1PH wires=['4-CU-B-7' '2-CU-B-7' ]
New Line.259545341 Phases= 3  Bus1=259545338.1.2.3 Bus2=259545343.1.2.3 Length=84.560000 units=m Spacing=8'-ARM-STANDARD-3PH wires=['2-ACSR-B-6X1' '2-ACSR-B-6X1' '2-ACSR-B-6X1' '2-ACSR-B-6X1' ]
New Line.258851331 Phases= 1  Bus1=258851328.3 Bus2=258851333.3 Length=36.890000 units=m Spacing=VERTICAL-1-PH-60-1PH wires=['2-ACSR-B-6X1' '2-ACSR-B-6X1' ]
New Line.258840115 Phases= 1  Bus1=258840112.2 Bus2=258840117.2 Length=35.980000 units=m Spacing=VERTICAL-1-PH-60-1PH wires=['2-ACSR-B-6X1' '1/0-ACSR-B-6X1' ]
New Line.258851296 Phases= 3  Bus1=258851293.1.2.3 Bus2=258851298.1.2.3 Length=12.220000 units=m Spacing=8'-ARM-NON-CENTER-POST-3PH wires=['2-ACSR-B-6X1' '2-ACSR-B-6X1' '2-ACSR-B-6X1' '2-ACSR-B-6X1' ]
New Line.258840193 Phases= 3  Bus1=258840185.1.2.3 Bus2=258840195.1.2.3 Length=46.930000 units=m Spacing=8'-ARM-NON-CENTER-POST-3PH wires=['336-ACSR-B-18X1' '336-ACSR-B-18X1' '336-ACSR-B-18X1' '2-CU-B-7' ]
New Line.258851215 Phases= 3  Bus1=258851212.1.2.3 Bus2=258851217.1.2.3 Length=55.470000 units=m Spacing=8'-ARM-NON-CENTER-POST-3PH wires=['2-ACSR-B-6X1' '2-ACSR-B-6X1' '2-ACSR-B-6X1' '1/0-ACSR-B-6X1' ]
New Line.258840110 Phases= 1  Bus1=258840086.2 Bus2=258840112.2 Length=23.110000 units=m Spacing=VERTICAL-1-PH-60-1PH wires=['2-ACSR-B-6X1' '1/0-ACSR-B-6X1' ]
New Line.259121508 Phases= 1  Bus1=258840511.3 Bus2=258840515.3 Length=11.650000 units=m Spacing=VERTICAL-1-PH-60-1PH wires=['2-ACSR-B-6X1' '2-ACSR-B-6X1' ]
New Line.263515150 Phases= 3  Bus1=263515147.1.2.3 Bus2=259172465.1.2.3 Length=52.900000 units=m Spacing=8'-ARM-STANDARD-3PH wires=['1/0-ACSR-B-6X1' '1/0-ACSR-B-6X1' '1/0-ACSR-B-6X1' '1/0-ACSR-B-6X1' ]
New Line.258851153 Phases= 3  Bus1=258851128.1.2.3 Bus2=258851155.1.2.3 Length=38.980000 units=m Spacing=8'-ARM-NON-CENTER-POST-3PH wires=['2-ACSR-B-6X1' '2-ACSR-B-6X1' '2-ACSR-B-6X1' '1/0-ACSR-B-6X1' ]
New Line.258851210 Phases= 3  Bus1=258851207.1.2.3 Bus2=258851212.1.2.3 Length=47.590000 units=m Spacing=8'-ARM-NON-CENTER-POST-3PH wires=['2-ACSR-B-6X1' '2-ACSR-B-6X1' '2-ACSR-B-6X1' '1/0-ACSR-B-6X1' ]
New Line.258851291 Phases= 3  Bus1=258851254.1.2.3 Bus2=258851293.1.2.3 Length=13.330000 units=m Spacing=8'-ARM-NON-CENTER-POST-3PH wires=['2-ACSR-B-6X1' '2-ACSR-B-6X1' '2-ACSR-B-6X1' '2-ACSR-B-6X1' ]
New Line.258851037 Phases= 1  Bus1=258840435.2 Bus2=258851039.2 Length=31.290000 units=m Spacing=VERTICAL-1-PH-60-1PH wires=['1/0-ACSR-B-6X1' '1/0-ACSR-B-6X1' ]
New Line.258840198 Phases= 3  Bus1=258840195.1.2.3 Bus2=258840200.1.2.3 Length=58.110000 units=m Spacing=8'-ARM-NON-CENTER-POST-3PH wires=['336-ACSR-B-18X1' '336-ACSR-B-18X1' '336-ACSR-B-18X1' '2-CU-B-7' ]
New Line.258851032 Phases= 3  Bus1=258851029.1.2.3 Bus2=258851034.1.2.3 Length=20.010000 units=m Spacing=8'-ARM-NON-CENTER-POST-3PH wires=['2-ACSR-B-6X1' '2-ACSR-B-6X1' '2-ACSR-B-6X1' '2-ACSR-B-6X1' ]
New Line.258851158 Phases= 3  Bus1=258851155.1.2.3 Bus2=258851160.1.2.3 Length=55.140000 units=m Spacing=8'-ARM-NON-CENTER-POST-3PH wires=['2-ACSR-B-6X1' '2-ACSR-B-6X1' '2-ACSR-B-6X1' '1/0-ACSR-B-6X1' ]
New Line.263515037 Phases= 1  Bus1=258851059.3 Bus2=263515039.3 Length=1.530000 units=m Spacing=VERTICAL-1-PH-60-1PH wires=['2-ACSR-B-6X1' '2-ACSR-B-6X1' ]
New Line.258851316 Phases= 3  Bus1=258851313.1.2.3 Bus2=258851318.1.2.3 Length=3.060000 units=m Spacing=8'-ARM-STANDARD-3PH wires=['2-ACSR-B-6X1' '2-ACSR-B-6X1' '2-ACSR-B-6X1' '2-ACSR-B-6X1' ]
New Line.258851395 Phases= 2  Bus1=258851387.1.2 Bus2=258851397.1.2 Length=9.100000 units=m Spacing=8'-ARM-STANDARD-2PH wires=['6-CU-B-S' '6-CU-B-S' '2-CU-B-7' ]
New Line.258851390 Phases= 1  Bus1=258851387.2 Bus2=258851392.2 Length=34.550000 units=m Spacing=VERTICAL-1-PH-60-1PH wires=['2-ACSR-B-6X1' '2-CU-B-7' ]
New Line.258851136 Phases= 3  Bus1=258851133.1.2.3 Bus2=258851138.1.2.3 Length=24.800000 units=m Spacing=8'-ARM-NON-CENTER-POST-3PH wires=['2-ACSR-B-6X1' '2-ACSR-B-6X1' '2-ACSR-B-6X1' '1/0-ACSR-B-6X1' ]
New Line.263515132 Phases= 2  Bus1=263515129.1.3 Bus2=258851323.1.3 Length=5.900000 units=m Spacing=8'-ARM-STANDARD-2PH wires=['6-CU-B-S' '6-CU-B-S' '6-CU-B-S' ]
New Line.259357187 Phases= 3  Bus1=259357188.1.2.3 Bus2=259357189.1.2.3 Length=9.740000 units=m Spacing=8'-ARM-NON-CENTER-POST-3PH wires=['1/0-ACSR-WP-6X1' '1/0-ACSR-WP-6X1' '1/0-ACSR-WP-6X1' '2-ACSR-B-6X1' ]
New Line.263515136 Phases= 2  Bus1=258851376.1.2 Bus2=263515138.1.2 Length=1.530000 units=m Spacing=8'-ARM-STANDARD-2PH wires=['6-CU-B-S' '6-CU-B-S' '2-CU-B-7' ]
New Line.258851131 Phases= 3  Bus1=258851123.1.2.3 Bus2=258851133.1.2.3 Length=33.850000 units=m Spacing=8'-ARM-NON-CENTER-POST-3PH wires=['2-ACSR-B-6X1' '2-ACSR-B-6X1' '2-ACSR-B-6X1' '1/0-ACSR-B-6X1' ]
New Line.258851017 Phases= 1  Bus1=258851014.2 Bus2=258851019.2 Length=162.300000 units=m Spacing=VERTICAL-1-PH-60-1PH wires=['2-ACSR-B-6X1' '2-ACSR-B-6X1' ]
New Line.258851094 Phases= 3  Bus1=258851091.1.2.3 Bus2=258851096.1.2.3 Length=76.660000 units=m Spacing=8'-ARM-NON-CENTER-POST-3PH wires=['2-ACSR-B-6X1' '2-ACSR-B-6X1' '2-ACSR-B-6X1' '1/0-ACSR-B-6X1' ]
New Line.258851012 Phases= 1  Bus1=258851004.2 Bus2=258851014.2 Length=32.750000 units=m Spacing=VERTICAL-1-PH-60-1PH wires=['2-ACSR-B-6X1' '2-ACSR-B-6X1' ]
New Line.263515091 Phases= 3  Bus1=258851212.1.2.3 Bus2=263515093.1.2.3 Length=1.520000 units=m Spacing=8'-ARM-NON-CENTER-POST-3PH wires=['2-ACSR-B-6X1' '2-ACSR-B-6X1' '2-ACSR-B-6X1' '1/0-ACSR-B-6X1' ]
New Line.259500286 Phases= 3  Bus1=258840393.1.2.3 Bus2=258840397.1.2.3 Length=17.140000 units=m Spacing=8'-ARM-NON-CENTER-POST-3PH wires=['336-ACSR-WP-18X1' '336-ACSR-WP-18X1' '336-ACSR-WP-18X1' '1/0-ACSR-B-6X1' ]
New Line.263515096 Phases= 3  Bus1=263515093.1.2.3 Bus2=258851237.1.2.3 Length=86.290000 units=m Spacing=8'-ARM-NON-CENTER-POST-3PH wires=['2-ACSR-B-6X1' '2-ACSR-B-6X1' '2-ACSR-B-6X1' '1/0-ACSR-B-6X1' ]
New Line.258851116 Phases= 1  Bus1=258851108.1 Bus2=258851118.1 Length=27.010000 units=m Spacing=VERTICAL-1-PH-60-1PH wires=['1/0-ACSR-B-6X1' '1/0-ACSR-B-6X1' ]
New Line.258851195 Phases= 3  Bus1=258851185.1.2.3 Bus2=258851197.1.2.3 Length=154.100000 units=m Spacing=8'-ARM-NON-CENTER-POST-3PH wires=['2-ACSR-B-6X1' '2-ACSR-B-6X1' '2-ACSR-B-6X1' '1/0-ACSR-B-6X1' ]
New Line.258851111 Phases= 3  Bus1=258851108.1.2.3 Bus2=258851113.1.2.3 Length=47.680000 units=m Spacing=8'-ARM-NON-CENTER-POST-3PH wires=['2-ACSR-B-6X1' '2-ACSR-B-6X1' '2-ACSR-B-6X1' '1/0-ACSR-B-6X1' ]
New Line.264530184 Phases= 1  Bus1=259004990.1 Bus2=264530186.1 Length=1.520000 units=m Spacing=VERTICAL-1-PH-104-1PH wires=['1/0-ACSR-B-6X1' '1/0-ACSR-B-6X1' ]
New Line.264530189 Phases= 1  Bus1=264530186.1 Bus2=259312123.1 Length=25.990000 units=m Spacing=VERTICAL-1-PH-104-1PH wires=['1/0-ACSR-B-6X1' '1/0-ACSR-B-6X1' ]
New Line.259266827 Phases= 3  Bus1=258840000.1.2.3 Bus2=258840011.1.2.3 Length=12.750000 units=m Spacing=8'-ARM-NON-CENTER-POST-3PH wires=['336-ACSR-B-18X1' '336-ACSR-B-18X1' '336-ACSR-B-18X1' '2-CU-B-7' ]
New Line.263514871 Phases= 3  Bus1=263514868.1.2.3 Bus2=258850941.1.2.3 Length=72.380000 units=m Spacing=8'-ARM-NON-CENTER-POST-3PH wires=['2-ACSR-B-6X1' '2-ACSR-B-6X1' '2-ACSR-B-6X1' '2-ACSR-B-6X1' ]
New Line.259237108 Phases= 2  Bus1=259004980.1.2 Bus2=259237110.1.2 Length=22.940000 units=m Spacing=8'-ARM-STANDARD-2PH wires=['2-ACSR-B-6X1' '2-ACSR-B-6X1' '2-ACSR-B-6X1' ]
New Line.259237103 Phases= 2  Bus1=259004984.1.2 Bus2=259237105.1.2 Length=22.920000 units=m Spacing=8'-ARM-STANDARD-2PH wires=['2-ACSR-B-6X1' '2-ACSR-B-6X1' '2-ACSR-B-6X1' ]
New Line.264379502 Phases= 3  Bus1=264379499.1.2.3 Bus2=258850633.1.2.3 Length=74.100000 units=m Spacing=HORIZ-LINE-POST-3PH wires=['336-ACSR-B-18X1' '336-ACSR-B-18X1' '336-ACSR-B-18X1' '1/0-ACSR-B-6X1' ]
New Line.263514853 Phases= 3  Bus1=263514850.1.2.3 Bus2=258850960.1.2.3 Length=35.130000 units=m Spacing=8'-ARM-NON-CENTER-POST-3PH wires=['2-ACSR-B-6X1' '2-ACSR-B-6X1' '2-ACSR-B-6X1' '2-ACSR-B-6X1' ]
New Line.263514857 Phases= 3  Bus1=258850638.1.2.3 Bus2=263514859.1.2.3 Length=1.520000 units=m Spacing=8'-ARM-NON-CENTER-POST-3PH wires=['2-ACSR-B-6X1' '2-ACSR-B-6X1' '2-ACSR-B-6X1' '2-ACSR-B-6X1' ]
New Line.259005063 Phases= 3  Bus1=259005026.1.2.3 Bus2=259005065.1.2.3 Length=72.170000 units=m Spacing=8'-ARM-STANDARD-3PH wires=['1/0-ACSR-B-6X1' '1/0-ACSR-B-6X1' '1/0-ACSR-B-6X1' '1/0-ACSR-B-6X1' ]
New Line.259005044 Phases= 1  Bus1=259005041.2 Bus2=259005046.2 Length=32.920000 units=m Spacing=VERTICAL-1-PH-60-1PH wires=['2-ACSR-B-6X1' '2-ACSR-B-6X1' ]
New Line.263514893 Phases= 3  Bus1=258850720.1.2.3 Bus2=263514895.1.2.3 Length=1.520000 units=m Spacing=8'-ARM-NON-CENTER-POST-3PH wires=['2-ACSR-B-6X1' '2-ACSR-B-6X1' '2-ACSR-B-6X1' '2-ACSR-B-6X1' ]
New Line.471228161 Phases= 3  Bus1=471228158.1.2.3 Bus2=263645693.1.2.3 Length=9.100000 units=m Spacing=8'-ARM-STANDARD-3PH wires=['2-ACSR-B-6X1' '2-ACSR-B-6X1' '2-ACSR-B-6X1' '1/0-ACSR-B-6X1' ]
New Line.259005049 Phases= 3  Bus1=259005051.1.2.3 Bus2=259005041.1.2.3 Length=116.300000 units=m Spacing=8'-ARM-STANDARD-3PH wires=['336-ACSR-B-18X1' '336-ACSR-B-18X1' '336-ACSR-B-18X1' '1/0-ACSR-B-6X1' ]
New Line.263514898 Phases= 3  Bus1=263514895.1.2.3 Bus2=258850912.1.2.3 Length=17.760000 units=m Spacing=8'-ARM-NON-CENTER-POST-3PH wires=['2-ACSR-B-6X1' '2-ACSR-B-6X1' '2-ACSR-B-6X1' '2-ACSR-B-6X1' ]
New Line.258850997 Phases= 3  Bus1=258850994.1.2.3 Bus2=258850999.1.2.3 Length=15.480000 units=m Spacing=8'-ARM-NON-CENTER-POST-3PH wires=['2-ACSR-B-6X1' '2-ACSR-B-6X1' '2-ACSR-B-6X1' '2-ACSR-B-6X1' ]
New Line.259207081 Phases= 3  Bus1=259207082.1.2.3 Bus2=258851446.1.2.3 Length=10.380000 units=m Spacing=8'-ARM-STANDARD-3PH wires=['1/0-ACSR-B-6X1' '1/0-ACSR-B-6X1' '1/0-ACSR-B-6X1' '1/0-ACSR-B-6X1' ]
New Line.258850915 Phases= 3  Bus1=258850912.1.2.3 Bus2=258850917.1.2.3 Length=13.010000 units=m Spacing=8'-ARM-NON-CENTER-POST-3PH wires=['2-ACSR-B-6X1' '2-ACSR-B-6X1' '2-ACSR-B-6X1' '2-ACSR-B-6X1' ]
New Line.258850992 Phases= 3  Bus1=258850989.1.2.3 Bus2=258850994.1.2.3 Length=18.020000 units=m Spacing=8'-ARM-NON-CENTER-POST-3PH wires=['2-ACSR-B-6X1' '2-ACSR-B-6X1' '2-ACSR-B-6X1' '2-ACSR-B-6X1' ]
