New loadshape.LS_Solar npts=1440 sinterval=60 mult=(0.000191 0.000190 0.000189 0.000189 0.000188 0.000187 0.000186 0.000185 0.000184 0.000184 0.000183 0.000182 0.000181 0.000180 0.000179 0.000178 0.000178 0.000177 0.000176 0.000175 0.000174 0.000173 0.000173 0.000172 )
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new generator.PV bus1=258896578 phases=3 kv=12.47 kW=7100 pf=1.00 Daily=LS_Solar enable=true
