New Storage.BESS1 Bus1=699613275 Phases=3 kV=12.47
~ kWRated=1000
~ kWhRated=10000
~ %stored=100
~ %reserve=20
~ %EffCharge=93
~ %EffDischarge=96.7
~ State=IDLING

!~ State=DISCHARGING
!~ %Discharge=20

/*
New StorageController.BESS_C1 element=line.259363665 terminal=1
~ kWTarget=3400
~ TimeChargeTrigger=-1
~ eventlog=y
~ modedischarge=PeakShave
*/
