New Capacitor.38395182 Phases= 4  Bus1=258425776 kvar= 600  kV= 232.094808272
New Capacitor.38391707_Sw Phases= 1  Bus1=258406388 kvar= 450  kV= 134
! Placeholder CapControl
New Capcontrol.38391707 Element=Line.258406386 Terminal=2 Capacitor=38391707_Sw Type=voltage ONsetting=118 OFFsetting=122 PTRatio= 1.11666666666667  VoltOverride=N Vmax = 116.000000 Vmin = 0 enabled=F
