New loadshape.LS_Solar npts=17280 sinterval=5 mult=(0.000000 0.000000 0.000000 0.000000 0.000000 0.000000 0.000000 0.000000 0.000000 0.000000 0.000000 0.000000 0.000000 0.000000 0.000000 0.000000 0.000000 0.000000 0.000000 0.000000 0.000000 0.000000 0.000000 0.000000 )
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new generator.PV bus1=699613275 phases=3 kv=12.47 kW=3700 pf=1.00 Daily=LS_Solar enable=true
