New SwtControl.264487407 SwitchedObj=Line.264487407 SwitchedTerm=1 Action=Closed Lock=no
New SwtControl.264487226 SwitchedObj=Line.264487226 SwitchedTerm=1 Action=Closed Lock=no
New SwtControl.264353599 SwitchedObj=Line.264353599 SwitchedTerm=2 Action=Open Lock=no
New SwtControl.264487208 SwitchedObj=Line.264487208 SwitchedTerm=1 Action=Open Lock=no
New SwtControl.264487008 SwitchedObj=Line.264487008 SwitchedTerm=1 Action=Closed Lock=no
New SwtControl.290021054 SwitchedObj=Line.290021054 SwitchedTerm=1 Action=Closed Lock=no
New SwtControl.264487416 SwitchedObj=Line.264487416 SwitchedTerm=1 Action=Open Lock=no
New SwtControl.264487217 SwitchedObj=Line.264487217 SwitchedTerm=1 Action=Closed Lock=no
New SwtControl.699613064 SwitchedObj=Line.699613064 SwitchedTerm=1 Action=Closed Lock=no
