New LineSpacing.8'-ARM-NON-CENTER-POST-3PH Ncond=4 Nphases=3 x=[ -1.1278  0.3048  1.1278  0.0000 ] h=[ 10.3632  10.3632  10.3632  7.9248 ]
New LineSpacing.VERTICAL-1-PH-104-1PH Ncond=2 Nphases=1 x=[ 0.0000  0.0000 ] h=[ 10.7686  7.9248 ]
New LineSpacing.HORIZ-LINE-POST-3PH Ncond=4 Nphases=3 x=[ -0.4877  0.0000  0.4877  0.0000 ] h=[ 9.7536  10.6680  9.7536  7.9248 ]
New LineSpacing.DEFAULT Ncond=4 Nphases=3 x=[ -2.4000  0.0000  2.4000  0.9000 ] h=[ 16.7500  17.3500  16.7500  13.7500 ]
New LineSpacing.HORIZ-LINE-POST-2PH Ncond=3 Nphases=2 x=[ 0.0000  0.4877  0.0000 ] h=[ 10.6680  9.7536  7.9248 ]
New LineSpacing.VERTICAL-1-PH-60-1PH Ncond=2 Nphases=1 x=[ 0.0000  0.0000 ] h=[ 10.6680  8.8392 ]
New LineSpacing.8'-ARM-STANDARD-3PH Ncond=4 Nphases=3 x=[ -1.1278  0.0000  1.1278  0.0000 ] h=[ 10.3632  10.6680  10.3632  7.9248 ]
New LineSpacing.DBL-CKT-10'-&amp;-8'-ARMS-3PH Ncond=4 Nphases=3 x=[ 1.3716  1.0363  0.4572  0.0000 ] h=[ 11.2776  10.3632  11.2776  8.5344 ]
New LineSpacing.NEUTRAL-ON-ARM-1PH Ncond=2 Nphases=1 x=[ -1.1278  1.1278 ] h=[ 10.3632  10.3632 ]
New LineSpacing.8'-ARM-STANDARD-2PH Ncond=3 Nphases=2 x=[ -1.1278  1.1278  0.0000 ] h=[ 10.3632  10.3632  7.9248 ]
New LineSpacing.DEFAULT Ncond=7 Nphases=6 x=[ -6.0000  -9.0000  -6.0000  6.0000  9.0000  6.0000  0.0000 ] h=[ 36.7500  26.0000  15.2500  36.7500  26.0000  15.2500  49.0000 ]
