! ---------------------------------
!! Converted from CYME
! DATE=May 26, 2015 at 10:38:55
! CYME_VERSION=5.04
! CYMDIST_REVISION=02
! ---------------------------------
!
clear
Compile 'C:\Users\jlavall\Documents\GitHub\CAPER\03_OpenDSS_Circuits\Roxboro_Circuit_Opendss\Master.DSS'
!
! Recommendation: Add an energymeter here to first line in feeder
New EnergyMeter.CircuitMeter LINE.PH997__2571841 terminal=1 option=R PhaseVoltageReport=yes
EnergyMeter.CircuitMeter.peakcurrent=[  232.766663065503   242.994085721044   238.029663479192  ]
!
! Disable Capacitors for load allocation
Disable Capacitor.*
!
AllocateLoad
AllocateLoad
AllocateLoad
!Dump AllocationFactors
!
! Enable capacitors before solving
Enable Capacitor.*
!
Solve
!
!Show V LN Node
! Some Optional commands
/***** Begin Block Comment ******
plot circuit Power    max=2000 n n C1=$00FF0000  1ph=3
plot circuit Voltage Max=2000 dots=n labels=n subs=y C1=$00FF0000
!
plot profile phases=all    ' Requires an energymeter
*** End Block Comment  *****/
