New Capacitor.E1183_2582120 Phases= 3  	 Bus1=E1183_2582120 	kvar= 1200  kV= 22.8630706656 states=1
New Capacitor.E2M13_104080657 Phases= 3  Bus1=E2M13_104080657 	kvar= 1200  kV= 22.8630706656 states=1
New Capacitor.EXF80_2573355 Phases= 3  	 Bus1=EXF80_2573355 	kvar= 1200  kV= 22.8630706656 states=1
