New LineSpacing.8'-ARM-NON-CENTER-POST-3PH Ncond=4 Nphases=3 x=[ -1.1278  0.3048  1.1278  0.0000 ] h=[ 10.3632  10.3632  10.3632  7.9248 ]
New LineSpacing.VERTICAL-1-PH-104-1PH Ncond=2 Nphases=1 x=[ 0.0000  0.0000 ] h=[ 10.7686  7.9248 ]
New LineSpacing.DBL-CKT-1-ARM-ONE-SIDE-3PH Ncond=4 Nphases=3 x=[ 0.3962  0.7620  1.1278  0.0000 ] h=[ 10.3632  10.3632  10.3632  7.9248 ]
New LineSpacing.HORIZ-LINE-POST-3PH Ncond=4 Nphases=3 x=[ -0.4877  0.0000  0.4877  0.0000 ] h=[ 9.7536  10.6680  9.7536  7.9248 ]
New LineSpacing.DEFAULT Ncond=0 Nphases= x=[  ] h=[  ]
New LineSpacing.VERTICAL-1-PH-60-1PH Ncond=2 Nphases=1 x=[ 0.0000  0.0000 ] h=[ 10.6680  8.8392 ]
New LineSpacing.8'-ARM-STANDARD-3PH Ncond=4 Nphases=3 x=[ -1.1278  0.0000  1.1278  0.0000 ] h=[ 10.3632  10.6680  10.3632  7.9248 ]
New LineSpacing.8'-ARM-STANDARD-2PH Ncond=3 Nphases=2 x=[ -1.1278  1.1278  0.0000 ] h=[ 10.3632  10.3632  7.9248 ]
New LineSpacing.DEFAULT Ncond=7 Nphases=6 x=[ -6.0000  -9.0000  -6.0000  6.0000  9.0000  6.0000  0.0000 ] h=[ 36.7500  26.0000  15.2500  36.7500  26.0000  15.2500  49.0000 ]
