New Storage.BESS Bus1=705406810 Phases=3 kV=24.9
~ kWRated=1000
~ kWhRated=10000
~ %stored=20
~ %reserve=20
~ %EffCharge=93
~ %EffDischarge=96.7
~ State=IDLING


!New StorageController.BESS element=line.254399393 terminal=1
!~ kWTarget=5000
!~ %kWBand = 10
!~ TimeChargeTrigger=-1
!~ TimeDischargeTrigger=-1
!~ eventlog=y
!~ ModeDischarge=PeakShave
